# Задание 1
f(x) := sin(x)
a := 0
b := π/2
integral(f(x), x = a .. b) = 1
I_лев_пр(n) :=
    s ← 0
    h ← (b - a)/n
    for i ∈ 0 .. n - 1
        x ← a + i*h
        s ← s + f(x)
    I_лев_пр ← h*s
I_лев_пр(10) = 0.919403
I_лев_пр(100) = 0.992125
I_лев_пр(1000) = 0.999214
# Задание 2
n := 1000
h := (b - a)/n
x := a, a + h .. b
# [plot: d^2/dx^2(f(x)) vs x]
M := 1
R := (b - a)/12*h^2*M
R = 3.22982e-7
# Задание 3
N := 1000
X := runif(N, a, b)
X = [
    0.199774; 0.860007; 1.39282; 0.34087; 0.17805; 0.509813; 0.0137369; 0.959117; 0.906244; 0.281656
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]
# [plot: f(x) vs x]
C := 1.2
Y := runif(N, 0, C)
Y = [
    0.3287; 0.0444718; 0.263733; 0.255797; 1.16369; 0.248557; 1.12295; 0.559426; 0.954972; 1.16623
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]
nf :=
    nf ← 0
    for i ∈ 0 .. N - 1
        if Y[i] ≤ f(X[i])
            nf ← nf + 1
    nf
nf = 531
S := (b - a)*(C - 0)
S = 1.88496
I := S*nf/N
I = 1.00091
# Задание 4
X := [1; 1.5; 2; 2.5; 3; 3.5; 4; 4.5; 5; 5.5; 6; 6.5; 7]
Y := [15.4; 4.7; 1; 8.9; 28.4; 18; 15.5; 1; 3; 5.3; 11; 2; 4.1]
# x = {1; 1,5; 2; 2,5; 3; 3,5; 4; 4,5; 5; 5,5; 6; 6,5; 7}
# y = {15,4; 4,7; 1; 8,9; 28,4; 18; 15,5; 1; 3; 5,3; 11; 2; 4,1}
# [plot: Y vs X]
h := 0.2
n := 8
I_л_пр := h*sum(Y[k], k = 0 .. n - 1) = 18.58
I_mp := h/2*(Y[0] + Y[n] + sum(2*Y[k], k = 1 .. n - 1)) = 17.34
m := 1, 3. .. n - 1
j := 2, 4 .. n - 2
m := 1, 1 + 2 .. n - 1
j := 2, 2 + 2 .. n - 2
I_Симп := h/3*(Y[0] + sum(4*Y[m], m) + sum(2*Y[j], j) + Y[n]) = 15.9067
Pr_куб_прибл := cspline(X, Y)
x := 0.2, 0.2 + 0.01 .. 1.8
# [plot: Y, interp(Pr_куб_прибл, X, Y, x) vs X, x]
I_сплайн := integral(interp(Pr_куб_прибл, X, Y, x), x = 0.2 .. 1.8)
I_сплайн = 28.7743
