# занятие № 2
# ФУНКЦИИ.  ВЫВОД  ТАБЛИЦЫ  ЗНАЧЕНИЙ  ФУНКЦИИ.
# ПОСТРОЕНИЕ  ГРАФИКОВ.  СИМВОЛЬНЫЕ  ПРЕОБРАЗОВАНИЯ
# Пример 1
w := 87.3
f(k, d) := w*(k*cos(d)^4 - ln(k*d))
f(3, 11) = -305.245
f(4.18, 6.5) = 43.647
# Пример 2
u := 1
f(x) := sqrt(u + x) + tan(2*x)^2
f(7) = 55.3128
# Пример
x := 2, 2 + 0.5 .. 6
k := 0.5
x = [2; 2.5; 3; 3.5; 4; 4.5; 5; 5.5; 6]
# Пример 3
b := 1.75
x := 0.1, 0.1 + 0.3 .. 2.2
y(x) := atan(x)^3 + b
x = [0.1; 0.4; 0.7; 1; 1.3; 1.6; 1.9; 2.2]
y(x) = [1.75099; 1.80509; 1.97779; 2.23447; 2.51631; 2.78704; 3.03195; 3.24786]
# Пример 4
a := 0.55
x := 0.5, 0.5 + 0.25 .. 8
f(x) := sqrt(x)*exp(a*x) - 71
# [plot: f(x) vs x]
# Пример 5
a := 0.55
x := 0.5, 0.5 + 0.25 .. 8
f(x) := sqrt(x)*exp(a*x) - 71
g(x) := x^3*cos(3*x)
# [plot: f(x), g(x) vs x]
# Пример 6
(t^2 - 3*t - 4)/(t - 4) + 2*t - 5 simplify → 3*t - 4
# Пример 7
(r^2 - 4)/(15*r^2 - 8*r + 1) parfrac → 99/(10*(5*r - 1)) - 35/(6*(3*r - 1)) + 1/(3*5)
# Пример 8
cos(d) series → 1 - d^2/2 + d^4/24
# Пример 9
integral((v^2 + 5)/v, v) → 5*ln(v) + v^2/2
# Пример 10
clear(x)
d/dx*cos(x^2)^3 → d*cos(x^2)^3/dx
# Индивидуальные задания
# Вариант 1
# Задание 1
v := 3.9
t := 0.2, 0.2 + 0.4 .. 5.8
u(t) := sqrt(|tan(ln(v*t))|)
r(t) := v*sin(e^(-cos(t)))
# [plot: r(t), u(t) vs t]
# Задание 2  упрощение выражения
(cos(γ) + sin(2*γ)*cos(2*γ))*(cos(γ - 1)^2)/(sin(γ)^2 - sin(2*γ)) simplify → (sin(γ - 1)^2 - 1)*(sin(4*γ) + 2*cos(γ))/(cos(2*γ) + 2*sin(2*γ) - 1)
# задание 3 | символьное интегрирование и интегрирование
clear(x)
ln(x^2 - 5) - 3*x^3
integral(ln(x^2 - 5) - 3*x^3, x) → x*ln(x^2 - 5) - sqrt(5)*ln(x - sqrt(5)) - 3*x^4/4 - 2*x + sqrt(5)*ln(x + sqrt(5))
d/dx(ln(x^2 - 5) - 3*x^3) → 2*x/(x^2 - 5) - 9*x^2
