# Занятие 3
# СРЕДСТВА  MathCAD  ДЛЯ  РЕАЛИЗАЦИИ  МАТРИЧНЫХ  ВЫЧИСЛЕНИЙ
# Пример 1
A[1, 1] := 25
A[1, 2] := -3.77
A[2, 1] := 100
A[2, 2] := 0.16
A = [0, 0, 0; 0, 25, -3.77; 0, 100, 0.16]
# Пример 2
ORIGIN := 1
D := [3, 12, 1, 8, 21; 1, 4, -5, 14, 6; -8, 1, 7, -5, 27]
D := [
    3, 12, □, 1, □, 8, 21;
    □, □, □, □, □, □, □;
    □, □, □, □, □, □, □;
    1, 4, □, -5, □, 14, 6;
    -8, 1, □, 7, □, -5, 27
]  # error: Отсутствует элемент или выражение.
# Пример 3
H := [2.2, 1, -5, 0; 5, 13, 77, -11; 3, -1, 4, 16]
H[:, 1] = [1; 13; -1]
H[2, :] = [3, -1, 4, 16]
transpose(H) = [2.2, 5, 3; 1, 13, -1; -5, 77, 4; 0, -11, 16]
A := [5; 7; 23]
B := [-2; 21; 3]
A×B = [-462; -61; 119]
U := [3, 0, 2, 5; 7, -1, 8, 12; 1, 0, 2, 3; 7, 14, 4, -5]
|U| = 232
# Пример 4
ORIGIN := 1
X := [2, 5; -10, 7; 100, 1]
Z := [8, -7, 35, 1; 17, 1, 20, 12]
B := [1; 2; 3]
C := [10; 20; 30]
F := [9, 1.3, 77; 3, -5.1, 1; 0.7, 3, -1]
k := 0.01
B + C = [11; 22; 33]
C - B = [9; 18; 27]
Y := B*k
Y = [0.01; 0.02; 0.03]
P := X*Z
P = [101, -9, 170, 62; 39, 77, -210, 74; 817, -699, 3520, 112]
F^-1 = [0.00211779, 0.234268, 0.397338; 0.00373134, -0.0634328, 0.223881; 0.0126765, -0.026311, -0.0502219]
# Пример 5
A := [21, 8, 1; -17, 1, 6]
F := [11; 33; 77; 55]
R := [3, -1, 51, 12; 7, 30, 3, 0; 0, 5, 11, -7; 3, 9, 4, 7]
U := [-5, 10, 34; 111, 7, 33]
G := diag(F)
G = [11, 0, 0, 0; 0, 33, 0, 0; 0, 0, 77, 0; 0, 0, 0, 55]
Q := stack(A, U)
Q = [21, 8, 1; -17, 1, 6; -5, 10, 34; 111, 7, 33]
H := max(Q)
H = 111
W := min(Q)
W = -17
T := tr(R)
T = 51
V1 := [377; 5; -11; 101]
S := sort(V1)
S = [-11; 5; 101; 377]
csort(Q, 1) = [-17, 1, 6; -5, 10, 34; 21, 8, 1; 111, 7, 33]
mean(Q) = 17.5
mean(S) = 118
# Задание | 4,5,8,9,10,11,12
H := [2, -8, 3, -11; 7, 1, 3, 1; 10, 0.7, -1, 5; -2, 1, 0, 2.3]
A := [-1.8, 0.6, 2, 10, -6, 1.4, 4; 5.6, 1, -0.8, -0.5, 3, 4.6, 2; 9, 1.2, 4, 7.1, -7, 1, 3.4]
V := [36; 2; -7; 12]
# Задание | 4 | Определить скалярное произведение матриц А и В
A := [-1.8, 0.6, 2, 10, -6, 1.4, 4; 5.6, 1, -0.8, -0.5, 3, 4.6, 2; 9, 1.2, 4, 7.1, -7, 1, 3.4]
B := [5, 6.5; -5, 7; 5, -4; 9, 1; 5, 6; 3, -5; 1, 0]
P := A*B
P = [66.2, -48.5; 45.3, 41.1; 94.3, 11]
Задание
5
# Определить transpose(A),transpose(B) матрицу В умножить  на скаляр  k
B := B*k
transpose(A) = [-1.8, 5.6, 9; 0.6, 1, 1.2; 2, -0.8, 4; 10, -0.5, 7.1; -6, 3, -7; 1.4, 4.6, 1; 4, 2, 3.4]
transpose(B) = [0.05, -0.05, 0.05, 0.09, 0.05, 0.03, 0.01; 0.065, 0.07, -0.04, 0.01, 0.06, -0.05, 0]
# Ввести  две произвольные матрицы - Q и R - одинакового размера. Произвести  сложение Q + R и  вычитание Q - R.
# Задание | 6
Q = [21, 8, 1; -17, 1, 6; -5, 10, 34; 111, 7, 33]
R := [3, -1, 12; 7, 30, 0; 0, 5, -7; 3, 9, 7]
Q + R = [24, 7, 13; -10, 31, 6; -5, 15, 27; 114, 16, 40]
Q - R = [18, 9, -11; -24, -29, 6; -5, 5, 41; 108, -2, 26]
Задание
7
# Ввести  две  произвольные  матрицы ? Z  и  W. Объединить матрицы  Z  и  W  в одну путем подсоединения второй матрицы снизу
Z = [8, -7, 35, 1; 17, 1, 20, 12]
W := [6, -2, 27, 3; 31, 7, 19, 11]
Q := stack(Z, W)
Q = [8, -7, 35, 1; 17, 1, 20, 12; 6, -2, 27, 3; 31, 7, 19, 11]
Задание
8
# Ввести матрицу Н (из табл. 3.1). Вычислить определитель (двумя способами) и обратную матрицу для матрицы H.
|H| = -579.85
H = [2, -8, 3, -11; 7, 1, 3, 1; 10, 0.7, -1, 5; -2, 1, 0, 2.3]
d := det(H)
d = -579.85
H^-1 = [
    -0.0152971, 0.0303009, 0.0450116, -0.184186;
    -0.201949, 0.140726, -0.183668, -0.627749;
    0.0781754, 0.227335, -0.0834699, 0.456497;
    0.074502, -0.0348366, 0.118996, 0.547555
]
# Ввести вектор V (из табл. 3.1). Определить сумму элементов вектора, максимальный и минимальный элементы в нем, транспонировать вектор. Упорядочить элементы вектора по возрастанию. Создать на основе вектора V диагональную матрицу.
# Задание | 9
transpose(V) = [36, 2, -7, 12]
V = [36; 2; -7; 12]
V := diag(V)
V = [36, 0, 0, 0; 0, 2, 0, 0; 0, 0, -7, 0; 0, 0, 0, 12]
Задание
10
# Произвести перестановку строк матрицы Н таким образом, чтобы элементы 3-го столбца оказались упорядоченными по возрастанию; определить среднее арифметическое значение элементов матрицы  Н.
H = [2, -8, 3, -11; 7, 1, 3, 1; 10, 0.7, -1, 5; -2, 1, 0, 2.3]
csort(H, 3) = [10, 0.7, -1, 5; -2, 1, 0, 2.3; 2, -8, 3, -11; 7, 1, 3, 1]
mean(H) = 0.875
Задание
11
# Расположить строки матрицы H в обратной последовательности.
reverse(H) = [-2, 1, 0, 2.3; 10, 0.7, -1, 5; 7, 1, 3, 1; 2, -8, 3, -11]
# Задание | 12 | Создать единичную матрицу размером  6 * 6
identity(6) = [
    1, 0, 0, 0, 0, 0;
    0, 1, 0, 0, 0, 0;
    0, 0, 1, 0, 0, 0;
    0, 0, 0, 1, 0, 0;
    0, 0, 0, 0, 1, 0;
    0, 0, 0, 0, 0, 1
]
