# Занятие 7
# Пример 1
ORIGIN := 0
solve block
    # constraints
    (t^2 + 9)*d/dt(y(t)) + 19.5*t*y(t) - 7 == 0
    y(0) == 0.24
    # solver
    y := odesolve(y(t), 8)
end solve block
# [plot: y(t) vs t]
# Пример 2
y[0] := 0.24
D(t, y) := (-19.5*t*y[0] + 7)/(t^2 + 9)
Yrk := rkfixed(y, 0, 8, 500, D)
Yrk = [
    0, 0.24;
    0.016, 0.252375;
    0.032, 0.264603;
    0.048, 0.27667;
    0.064, 0.288561;
    0.08, 0.300263;
    0.096, 0.311764;
    0.112, 0.323049;
    0.128, 0.334109;
    0.144, 0.34493
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]
t := Yrk[:, 0]
y := Yrk[:, 1]
# [plot: y vs t]
# Пример 3
clear(y)
y[0] := 0.24
D(t, y) := (-19.5*t*y[0] + 7)/(t^2 + 9)
Yrkad := Rkadapt(y, 0, 8, 500, D)
Yrkad = [
    0, 0.24;
    0.016, 0.252375;
    0.032, 0.264603;
    0.048, 0.27667;
    0.064, 0.288561;
    0.08, 0.300263;
    0.096, 0.311764;
    0.112, 0.323049;
    0.128, 0.334109;
    0.144, 0.34493
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]
t := Yrkad[:, 0]
y := Yrkad[:, 1]
# [plot: y vs t]
# Пример 4
clear(y)
y[0] := 0.5
D(t, y) := (-19.5*t*y[0] + 7)/(t^2 + 9)
Yrk := rkfixed(y, 0, 8, 500, D)
t := Yrk[:, 0]
y_0.5 := Yrk[:, 1]
y[0] := 1.5
D(t, y) := (-19.5*t*y[0] + 7)/(t^2 + 9)
Yrk := rkfixed(y, 0, 8, 500, D)
t := Yrk[:, 0]
y_1.5 := Yrk[:, 1]
y[0] := 3
D(t, y) := (-19.5*t*y[0] + 7)/(t^2 + 9)
Yrk := rkfixed(y, 0, 8, 500, D)
t := Yrk[:, 0]
y_3 := Yrk[:, 1]
y[0] := -1.5
D(t, y) := (-19.5*t*y[0] + 7)/(t^2 + 9)
Yrk := rkfixed(y, 0, 8, 500, D)
t := Yrk[:, 0]
y_минус_1.5 := Yrk[:, 1]
# [plot: y_0.5, y_1.5, y_3, y_минус_1.5 vs t]
# Задача 1
clear(y)
ORIGIN := 0
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solve block
    # constraints
    d/dt(y(t)) + 6.3*t^2*y(t) - 1.7*sqrt(t) == 0
    y(0) == -1.1
    # solver
    y := odesolve(y(t), 5)
end solve block
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y[0] := 5
D(t, y) := -6.3*t^2*y(0) + 1.7*sqrt(t)
Yrkad := Rkadapt(y, 0, 8, 500, D)
Yrkad = [
    0, 5;
    0.016, 5.00224;
    0.032, 5.00613;
    0.048, 5.01074;
    0.064, 5.01558;
    0.08, 5.02024;
    0.096, 5.02437;
    0.112, 5.02765;
    0.128, 5.02976;
    0.144, 5.0304
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]
t := Yrk[:, 0]
y_5 := Yrk[:, 1]
# [plot: y_5 vs t]
y[0] := 5
D(t, y) := -6.3*t^2*y(0) + 1.7*sqrt(t)
Yrkad := Rkadapt(y, 0, 8, 500, D)
t := Yrk[:, 0]
y_5 := Yrk[:, 1]
y[0] := 15
D(t, y) := -6.3*t^2*y(0) + 1.7*sqrt(t)
Yrkad := Rkadapt(y, 0, 8, 500, D)
t := Yrk[:, 0]
y_15 := Yrk[:, 1]
y[0] := 30
D(t, y) := -6.3*t^2*y(0) + 1.7*sqrt(t)
Yrkad := Rkadapt(y, 0, 8, 500, D)
t := Yrk[:, 0]
y_30 := Yrk[:, 1]
y[0] := -15
D(t, y) := -6.3*t^2*y(0) + 1.7*sqrt(t)
Yrkad := Rkadapt(y, 0, 8, 500, D)
t := Yrk[:, 0]
y_минус_15 := Yrk[:, 1]
# [plot: y_5, y_30, y_15, y_минус_15 vs t]
