# Занятие 9
# РЕАЛИЗАЦИЯ ТИПОВЫХ МОДЕЛЕЙ СЛУЧАЙНЫХ ПОСЛЕДОВАТЕЛЬНОСТЕЙ ПРИ ФОРМИРОВАНИИ
# СТОХАСТИЧЕСКИХ МОДЕЛЕЙ ФИЗИЧЕСКИХ СИСТЕМ
# пример | 1
ORIGIN := 0
nn := 1000
y := rnorm(nn, 0, 5)
y = [
    -0.125554; 1.2829; -1.48268; -5.4983; -14.8449; 0.352358; 9.12521; 5.59077; -2.28528; 1.07897
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]
i := 0 .. 999
# [plot: y[i] vs i]
m := 20
y_min := min(y) = -14.9911
y_max := max(y) = 17.2387
велич_интерввала := (y_max - y_min)/m = 1.61149
Gist := histogram(m, y)
Gist = [
    -14.1853, 7;
    -12.5739, 4;
    -10.9624, 9;
    -9.35087, 19;
    -7.73938, 33;
    -6.12789, 56;
    -4.5164, 77;
    -2.90491, 118;
    -1.29343, 130;
    0.318064, 139;
    1.92955, 121;
    3.54104, 103;
    5.15253, 67;
    6.76402, 45;
    8.37551, 36;
    9.987, 24;
    11.5985, 7;
    13.21, 2;
    14.8215, 2;
    16.433, 1
]
середина_инт := Gist[:, 0]
частота_попадания := Gist[:, 1]
# [plot: частота_попадания vs середина_инт]
# [plot: частота_попадания vs середина_инт]
частота_попадпния
y := sort(y)
y = [
    -14.9911; -14.9158; -14.8449; -14.6118; -14.5026; -14.0009; -13.5777; -12.6436; -12.1199; -11.9246
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]
# [plot: dnorm(y, 0, 1) vs y]
# [plot: dnorm(y, 0, 1), dnorm(y, 0, 2) vs y]
# пример 2
ORIGIN := 0
nn := 1000
i := 1 .. 1000
a := 0
1
b := 10
x := runif(nn, a, b)
x = [
    0.589646; 3.30327; 9.17281; 0.833855; 7.68052; 7.83997; 9.1329; 6.555; 9.06472; 5.74749
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]
# [plot: x[i] vs i]
m := 20
велич_интервала := (b - a)/m = 0.5
Gist := histogram(m, x)
Gist = [
    0.250999, 47;
    0.750821, 45;
    1.25064, 48;
    1.75047, 61;
    2.25029, 45;
    2.75011, 48;
    3.24994, 42;
    3.74976, 39;
    4.24958, 57;
    4.7494, 59;
    5.24923, 48;
    5.74905, 47;
    6.24887, 57;
    6.74869, 51;
    7.24852, 46;
    7.74834, 49;
    8.24816, 56;
    8.74799, 50;
    9.24781, 49;
    9.74763, 56
]
середина_инт := Gist[:, 0]
# [plot: частота_попадания, nn/m vs середина_инт, граница_инт]
частота_инт := a, 0 + велич_интервала .. b
попадания := частота_попадания/(nn*велич_интервала)
# [plot: частота_попадания vs середина_инт]
# [plot: dunif(x, a, b) vs x]
# задание | 1
nn := 1000
ORIGIN := 0
nn := 1000
y := rnorm(nn, 0, 1)
y = [
    -0.514224; 0.00295056; 0.988092; -0.380367; 1.44766; 1.59505; 0.312061; -0.964492; -1.39421; -0.696427
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]
# [plot: y[i] vs i]
i := 0 .. 1199
m := 1
y_min := min(y) = -3.37628
y_max := max(y) = 3.2532
велич_интерввала := (y_max - y_min)/m = 6.62949
# задание | 2
ORIGIN := 0
nn := 1000
i := 1 .. 1000
a := 0
b := 10
x := runif(nn, a, b)
x = [
    9.21123; 6.32443; 8.86956; 3.73823; 1.96535; 6.49758; 9.06331; 4.57105; 3.91407; 8.01671
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]
# [plot: x[i] vs i]
m := 14
велич_интервала := (b - a)/m = 0.714286
Gist := histogram(m, x)
Gist = [
    0.366974, 79;
    1.07793, 84;
    1.78888, 69;
    2.49983, 69;
    3.21078, 62;
    3.92173, 71;
    4.63268, 70;
    5.34363, 71;
    6.05459, 61;
    6.76554, 87;
    7.47649, 74;
    8.18744, 61;
    8.89839, 71;
    9.60934, 71
]
середина_инт := Gist[:, 0]
частота_попадпния := Gist[:, 1]
частота_инт := a, 0 + велич_интервала .. b
# [plot: частота_попадания, nn/m vs середина_инт, граница_инт]
попадания := частота_попадания/(nn*велич_интервала)
# [plot: частота_попадания vs середина_инт]
# [plot: dunif(x, a, b) vs x]
