# Джойс Роберт 22А
# Принципы создание документов PTC Mathcad Prime 3.1
# Лаораторная работа 1
# Пример 1
|71.21 - e^3.2|*1.78^4 + sqrt(217)/15.4 = 469.54
# Пример 2
c := 28
k := 0.357
l := -3.11
d := k^2*cos(c + l) + nthroot(c, 8)
d = 1.6404
# Пример 3
h^3 + 257*a - 4.3*sin(g)
h^3 + 257*a - 4.3*sin(g)/□
h^3 + 257*(a - 4.3*sin(g))/□
(h^3 + 257*a - 4.3*sin(g))/□
# Пример 4
tan(x^5)^2 + exp(u)
# Пример 5
u - sqrt(k + r) - e^(a + k) + v
u - sqrt(k + r) - (e^(a + k) + v)/□
u - sqrt(k + r) - e^(a + k) + v
u - sqrt(k + r) - □/(e^(a + k) + v)
# Пример 6
cos(b*x)/(a - t) + x^(a + b)
cos(b*x)*(3.5*a - t) + x^(a + b)
# Пример 7
sum(5*sin(k*u + v^2)/(sqrt(k*u + v^2) - tan(k*u + v^2)), k = 1 .. 7) + 7*v
# Задание 3
# Вариант 1
a := 7.013
b := 0.272
t := 2.73
y := nthroot(a*t, 3)*b*sin(sqrt((a + 2.7)*e^(-1.2*t)))^2/|b - tan(t*a)|
y = 7.17332
s := 0.13
d := 0.43
y := product(s*sqrt(d) + tan(s)^2, k = 1 .. 4) + sum(nthroot(d, 3), m = 1 .. 3)
y = 2.26446
# Задание 4
# Вариант 1
integral(x/ln(x^2), x = 1.4 .. 3.7) = 3.33813
integral((x^4 - e^(-2.5*x))/tan(2.1*x)^2, x = 3.38 .. 3.9) = 14.2151
