# Занятие 10
# МАТЕМАТИЧЕСКОЕ МОДЕЛИРОВАНИЕ.
# РЕШЕНИЕ ЗАДАЧИ ИНТЕРПОЛЯЦИИ
xx1 := 3.7
xx2 := 8.35
X := [0.5; 2.4; 5.3; 7.9; 10; 11.6; 13; 16; 17.7; 20]
Y := [6.252; 3.831; -9; 0.904; 2; 2.735; 5; 1.721; -4; -6.108]
xx3 := 18.9
MX(X) :=
    for i ∈ 0 .. 9
        for j ∈ 0 .. 9
            MX[i, j] ← X[i]^j
    MX
MX(X) = [
    1, 0.5, 0.25, 0.125, 0.0625, 0.03125, 0.015625, 0.0078125, 0.00390625, 0;
    1, 2.4, 5.76, 13.824, 33.1776, 79.6262, 191.103, 458.647, 1100.75, 2641.81;
    1, 5.3, 28.09, 148.877, 789.048, 4181.95, 22164.4, 117471, 622597, 3299764;
    1, 7.9, 62.41, 493.039, 3895.01, 30770.6, 243087, 1920391, 15171088, 119851596;
    1, 10, 100, 1000, 10000, 100000, 1000000, 10000000, 100000000, 1000000000;
    1, 11.6, 134.56, 1560.9, 18106.4, 210034, 2436396, 28262197, 327841489, 3.80296e9;
    1, 13, 169, 2197, 28561, 371293, 4826809, 62748517, 815730721, 10604499373;
    1, 16, 256, 4096, 65536, 1048576, 16777216, 268435456, 4294967296, 68719476736;
    1, 17.7, 313.29, 5545.23, 98150.6, 1737266, 30749609, 544268080, 9.63355e9, 1.70514e11;
    1, 20, 400, 8000, 160000, 3200000, 64000000, 1280000000, 25600000000, 512000000000
]
a := MX(X)^-1*Y
a = [-15.3377; 61.7689; -42.5084; 11.3489; -1.41682; 0.0727842; 0.00117441; -0.000312549; 1.33294e-5; -1.90555e-7]
полином_канонич(xx) := sum(a[i]*xx^i, i = 0 .. 9)
полином_канонич(3.7) = -8.44867
полином_канонич(8.35) = 1.62105
полином_канонич(18.9) = -2.53621
i := 0 .. 9
# [plot: Y[i] vs X[i]]
xx := 0.5, 0.5 + 0.01 .. 20
# [plot: Y[i], полином_канонич(xx) vs X[i], xx]
# к выполнению задания 2
полином_Лагранжа(X, Y, xx) := sum(a[i]*xx^i, i = 0 .. 9)
полином_Лагранжа(X, Y, 3.7) = -8.44867
полином_Лагранжа(X, Y, 8.35) = 1.62105
полином_Лагранжа(X, Y, 18.9) = -2.53621
# [plot: Y[i], полином_Лагранжа(X, Y, xx) vs X[i], xx]
# Пример 3
# [plot: Y[i], полином_канонич(xx), полином_Лагранжа(X, Y, xx) vs X[i], xx]
# Пример 4
clear(X, Y, Pr_куб_прибл, xx, сплайн_куб_пр)
xx1 := 3.7
xx2 := 8.35
xx3 := 18.9
X := [0.5; 2.4; 5.3; 7.9; 10; 11.6; 13; 16; 17.7; 20]
Y := [6.252; 3.831; -9; 0.904; 2; 2.735; 5; 1.721; -4; -6.108]
Pr_куб_прибл := cspline(X, Y)
сплайн_куб_пр(xx) := interp(Pr_куб_прибл, X, Y, xx)
сплайн_куб_пр(3.7) = -3.72429
сплайн_куб_пр(8.35) = 1.8922
сплайн_куб_пр(18.9) = -6.68437
# [plot: Y[i], полином_Лагранжа(X, Y, xx), сплайн_куб_пр(xx) vs X[i], xx]
Pr_лин_прибл := lspline(X, Y)
сплайн_лин_пр(xx) := interp(Pr_лин_прибл, X, Y, xx)
Pr_кв_прибл := pspline(X, Y)
сплайн_кв_пр(xx) := interp(Pr_кв_прибл, X, Y, xx)
# [plot: сплайн_куб_пр(xx), сплайн_лин_пр(xx), сплайн_кв_пр(xx) vs xx]
# Задание 1
xx1 := 2.3
xx2 := 4.2
x := [1; 1.6; 1.8; 3.05; 4; 5; 7.13; 8; 8.97]
y := [-5.4; -4.07; -1; 3.9; 8.477; 12; 3.024; 7; 9.121]
xx3 := 6
MX(X) :=
    for i ∈ 0 .. 9
        for j ∈ 0 .. 9
            MX[i, j] ← X[i]^j
    MX
MX(X) = [
    1, 0.5, 0.25, 0.125, 0.0625, 0.03125, 0.015625, 0.0078125, 0.00390625, 0;
    1, 2.4, 5.76, 13.824, 33.1776, 79.6262, 191.103, 458.647, 1100.75, 2641.81;
    1, 5.3, 28.09, 148.877, 789.048, 4181.95, 22164.4, 117471, 622597, 3299764;
    1, 7.9, 62.41, 493.039, 3895.01, 30770.6, 243087, 1920391, 15171088, 119851596;
    1, 10, 100, 1000, 10000, 100000, 1000000, 10000000, 100000000, 1000000000;
    1, 11.6, 134.56, 1560.9, 18106.4, 210034, 2436396, 28262197, 327841489, 3.80296e9;
    1, 13, 169, 2197, 28561, 371293, 4826809, 62748517, 815730721, 10604499373;
    1, 16, 256, 4096, 65536, 1048576, 16777216, 268435456, 4294967296, 68719476736;
    1, 17.7, 313.29, 5545.23, 98150.6, 1737266, 30749609, 544268080, 9.63355e9, 1.70514e11;
    1, 20, 400, 8000, 160000, 3200000, 64000000, 1280000000, 25600000000, 512000000000
]
a := MX(X)^-1*Y
a = [-15.3377; 61.7689; -42.5084; 11.3489; -1.41682; 0.0727842; 0.00117441; -0.000312549; 1.33294e-5; -1.90555e-7]
полином_канонич(xx) := sum(a[i]*xx^i, i = 0 .. 9)
полином_канонич(3.7) = -8.44867
полином_канонич(8.35) = 1.62105
полином_канонич(18.9) = -2.53621
i := 0 .. 9
# [plot: Y[i] vs X[i]]
xx := 0.5, 0.5 + 0.01 .. 20
# [plot: Y[i], полином_канонич(xx) vs X[i], xx]
ORIGIN := 0
полином_Лагранжа(X, Y, xx) :=
    f(xx) ← 0
    i ← 0
    for i ∈ 0, 0 + 1 .. 9
        f(xx) ← f(xx) + a[i]*xx^i
    f(xx)
sum(a[i]*xx^i, i = 0 .. 9)
полином_Лагранжа(X, Y, 3.7) = -8.44867
полином_Лагранжа(X, Y, 8.35) = 1.62105
полином_Лагранжа(X, Y, 18.9) = -2.53621
# [plot: Y[i], полином_Лагранжа(X, Y, xx) vs X[i], xx]
# [plot: Y[i], полином_канонич(xx), полином_Лагранжа(X, Y, xx) vs X[i], xx]
Pr_куб_прибл := cspline(X, Y)
сплайн_куб_пр(xx) := interp(Pr_куб_прибл, X, Y, xx)
сплайн_куб_пр(3.7) = -3.72429
сплайн_куб_пр(8.35) = 1.8922
# [plot: Y[i], полином_Лагранжа(X, Y, xx), сплайн_куб_пр(xx) vs X[i], xx]
сплайн_куб_пр(18.9) = -6.68437
Pr_лин_прибл := lspline(X, Y)
сплайн_лин_пр(xx) := interp(Pr_лин_прибл, X, Y, xx)
Pr_кв_прибл := pspline(X, Y)
сплайн_кв_пр(xx) := interp(Pr_кв_прибл, X, Y, xx)
# [plot: сплайн_куб_пр(xx), сплайн_лин_пр(xx), сплайн_кв_пр(xx) vs xx]
