# занятие 11
# ПОСТРОЕНИЕ  ЭМПИРИЧЕСКИХ  МОДЕЛЕЙ НА  ОСНОВЕ  АППРОКСИМАЦИИ  ДАННЫХ
# Пример 1
ORIGIN := 1
X := [1.3; 2.1; 2.9; 3.7; 4.5; 5.3; 6.1; 6.9; 7.7; 8.5]
Y := [0.2; 1.31; 6; 6.11; 12.53; 13.9; 18; 18.8; 22.4; 27.05]
i := 1 .. 10
# [plot: Y[i] vs X[i]]
m := 10
.
a := (m*sum(X[i]*Y[i], i = 1 .. m) - sum(X[i]*sum(Y[i], i = 1 .. m), i = 1 .. m))/(m*sum(X[i]^2, i = 1 .. m) - sum(X[i], i = 1 .. m)^2)
a = 3.71455
b := (sum(Y[i]*sum(X[i]^2, i = 1 .. m), i = 1 .. m) - sum(X[i]*sum(X[i]*Y[i], i = 1 .. m), i = 1 .. m))/(m*sum(X[i]^2, i = 1 .. m) - sum(X[i], i = 1 .. m)^2)
b = -5.57127
xx := 1.3, 1.3 + 0.01 .. 8.5
R_лин(xx) := a*xx + b
# [plot: X[i], xx vs Y[i], R_лин(xx)]
a := slope(X, Y)
b := intercept(X, Y)
a = 3.71455
b = -5.57127
вект_коэфф := line(X, Y) = [-5.57127; 3.71455]
stderr(X, Y) = 1.25031
коэфф_Пирсона := corr(X, Y) = 0.991526
# Пример 2
clear(X, Y, i, M, C, A, y, полин_2_ст)
X := [4; 8; 12; 16; 20; 24; 28; 32; 36; 40]
Y := [0.25; 3.9; 5.37; 10.5; 16.24; 16.1; 20.02; 18.88; 15.51; 8.83]
i := 1 .. 10
# [plot: Y[i] vs X[i]]
m := 10
M[1, 1] := sum(X[i]^4, i = 1 .. m)
M[1, 2] := sum(X[i]^3, i = 1 .. m)
M[1, 3] := sum(X[i]^2, i = 1 .. m)
M[2, 1] := sum(X[i]^3, i = 1 .. m)
M[2, 2] := sum(X[i]^2, i = 1 .. m)
M[2, 3] := sum(X[i], i = 1 .. m)
M[3, 1] := sum(X[i]^2, i = 1 .. m)
M[3, 2] := sum(X[i], i = 1 .. m)
M[3, 3] := m
M = [6485248, 193600, 6160; 193600, 6160, 220; 6160, 220, 10]
C[1] := sum(X[i]^2*Y[i], i = 1 .. m)
C[2] := sum(X[i]*Y[i], i = 1 .. m)
C[3] := sum(Y[i], i = 1 .. m)
C = [88742.2; 3052.12; 115.6]
A := M^-1*C
A = [-0.0359541; 1.96752; -9.57783]
# y=-9.578+1.968x-0.036x^2
полин_2_ст := polyfit(X, Y, 2)
xx := 4.4 + 0.01 .. 41
# [plot: Y[i], полин_2_ст(xx) vs X[i], xx]
.
# данные для заданий 1 и 4
# x = {1;  4;  7;  10;  13;  16;  19;  22;  25;  28;  31;  34}
# y = {13,5;  11,57;  11,2;  8,56;  8,79;  6,47;  6;  4,11;  3,98;  2;  0,33;  0,99}
ORIGIN := 1
M*A = [88742.2; 3052.12; 115.6]
=
C = [88742.2; 3052.12; 115.6]
X := [1; 4; 7; 10; 13; 16; 19; 22; 25; 28; 31; 34]
Y := [13.5; 11.57; 11.2; 8.56; 8.79; 6.47; 6; 4.11; 3.98; 2; 0.33; 0.99]
i := 1 .. 12
# [plot: Y[i] vs X[i]]
m := 10
a := (m*sum(X[i]*Y[i], i = 1 .. m) - sum(X[i]*sum(Y[i], i = 1 .. m), i = 1 .. m))/(m*sum(X[i]^2, i = 1 .. m) - sum(X[i], i = 1 .. m)^2)
a = -0.408242
b := (sum(Y[i]*sum(X[i]^2, i = 1 .. m), i = 1 .. m) - sum(X[i]*sum(X[i]*Y[i], i = 1 .. m), i = 1 .. m))/(m*sum(X[i]^2, i = 1 .. m) - sum(X[i], i = 1 .. m)^2)
b = 13.5375
xx := 1, 1 + 0.01 .. 34
R_лин(xx) := a*xx + b
# [plot: X[i], xx vs Y[i], R_лин(xx)]
a := slope(X, Y)
b := intercept(X, Y)
a = -0.396946
b = 13.4049
вект_коэфф := line(X, Y) = [13.4049; -0.396946]
stderr(X, Y) = 0.668294
коэфф_Пирсона := corr(X, Y) = -0.989167
коэфф_Пирсона := corr(X, Y) = -0.989167
# з а д а н и я 2
ORIGIN := 1
X := [0; 1.5; 3; 4.5; 6; 7.5; 9; 10.5; 12; 13.5; 15; 16.5; 18]
Y := [13.51; 8.99; 8.13; 6.79; 6.24; 10.6; 13.02; 13; 15.51; 19.13; 27; 23.15; 24.9]
i := 1 .. 12
# [plot: Y[i] vs X[i]]
m := 10
M[1, 1] := sum(X[i]^4, i = 1 .. m)
M[1, 2] := sum(X[i]^3, i = 1 .. m)
M[1, 3] := sum(X[i]^2, i = 1 .. m)
M[2, 1] := sum(X[i]^3, i = 1 .. m)
M[2, 2] := sum(X[i]^2, i = 1 .. m)
M[2, 3] := sum(X[i], i = 1 .. m)
M[3, 1] := sum(X[i]^2, i = 1 .. m)
M[3, 2] := sum(X[i], i = 1 .. m)
M[3, 3] := m
M = [77623.3, 6834.38, 641.25; 6834.38, 641.25, 67.5; 641.25, 67.5, 10]
C[1] := sum(X[i]^2*Y[i], i = 1 .. m)
C[2] := sum(X[i]*Y[i], i = 1 .. m)
C[3] := sum(Y[i], i = 1 .. m)
C = [9259.54; 883.425; 114.92]
A := M^-1*C
A = [0.163165; -1.62244; 11.9805]
# y=13.77-0.458x+0.002χ
полин_2_ст := polyfit(X, Y, 2)
# [plot: X[i], xx vs Y[i], полин_2_ст(xx)]
xx := 4.6 + 0.01 .. 35
M*A = [9259.54; 883.425; 114.92]
=
C = [9259.54; 883.425; 114.92]
