# занятие 6
# МАТЕМАТИЧЕСКИЕ МОДЕЛИ В ФОРМЕ НЕЛИНЕЙНЫХ
# АЛГЕБРАИЧЕСКИХ И ТРАНСЦЕНДЕНТНЫХ УРАВНЕНИЙ И
# ОСОБЕННОСТИ ИХ РЕШЕНИЯ ЧИСЛЕННЫМИ МЕТОДАМИ
вариант1
root(f(x), x, a, b)
вариант2
root(f(x), x)
x^2 - cos(x)
x := -1.5, -1.5 + 0.01 .. 1.5
f(x) := x^2 - cos(x)
# [plot: f(x) vs x]
x := 0.5, 0.5 + 0.01 .. 1.2
# [plot: f(x) vs x]
x^2 - cos(x)
z(x) := x^2
g(x) := cos(x)
# [plot: z(x), g(x) vs x]
root(f(x), x, 0.5, 1.2) = 0.824132
x := 0.8
root(f(x), x) = 0.824132
f(x) := x^2 - cos(x)
φ(x) := x^2 - cos(x) + x
x := 0.5
d/dx(φ(x))
= 2.47943
x := 1.2
d/dx(φ(x))
= 4.33204
x := 0.5, 0.5 + 0.01 .. 1.2
# [plot: d/dx(f(x)) vs x]
x := 1.2
M :=
    d/dx(f(x))
    = 3.33204
M = 3.33204
λ := -1/M
λ = -0.300117
φ(x) := x + λ*(x^2 - cos(x))
x := 0.5
d/dx(φ(x))
= 0.556
x := 1.2
d/dx(φ(x))
= 2.55301e-16
метод_итерации(φ, a, b) :=
    x ← a
    n ← 0
    while |φ(x) - x| > 0.0001
        x ← φ(x)
        n ← n + 1
    [x; n; f(x)]
метод_итерации(φ, 0.5, 1.2) = [0.824037; 7; -0.000226873]
x := -4, -4 + 0.01 .. 4
f(x) := x + e^(0.7*x)
# [plot: f(x) vs x]
# уравнение имеет
# один корень
# уточненный интервал от -0.8 до 1.6
x := -0.8, -0.8 + 0.01 .. 1.6
# [plot: f(x) vs x]
x + e^(0.7*x)
z(x) := x
g(x) := e^(0.7*x)
# [plot: z(x), g(x) vs x]
Пример3
root(f(x), x, -0.8, 1.6) = -0.639243
x := 0.8
root(f(x), x) = -0.639243
Пример4
f(x) := x^2 - cos(x)
φ(x) := x^2 - cos(x) + x
x := 0.5
d/dx(φ(x))
= 2.47943
x := 1.2
d/dx(φ(x))
= 4.33204
x := 0.5, 0.5 + 0.01 .. 1.2
# [plot: d/dx(f(x)) vs x]
x := 1.2
M :=
    d/dx(f(x))
    = 3.33204
M = 3.33204
λ := -1/M
λ = -0.300117
φ(x) := x + λ*(x^2 - cos(x))
x := 0.5
d/dx(φ(x))
= 0.556
x := 1.2
d/dx(φ(x))
= 2.55301e-16
метод_итерации(φ, a, b) :=
    x ← a
    n ← 0
    while |φ(x) - x| > 0.0001
        x ← φ(x)
        n ← n + 1
    [x; n; f(x)]
метод_итерации(φ, 0.5, 1.2) = [0.824037; 7; -0.000226873]
# X+e^0.7x =0  [-4,4]
x := -4, -4 + 0.01 .. 4
f(x) := x + e^(0.7*x)
# [plot: f(x) vs x]
# На интервале [−4; 4] уравнение  имеет один корень, задаю уточняющий интервал:[-2;0]
x := -2, -2 + 0.01 .. 0
# [plot: f(x) vs x]
z(x) := x
g(x) := e^(0.7*x)
# [plot: x vs f(x), g(x)]
root(f(x), x, -2, 0) = -0.639243
x := 0.6
root(f(x), x) = -0.639243
f(x) := x + e^(0.17*x)
φ(x) := x + e^(0.17*x) + x
x := -2
d/dx(φ(x))
= 2.121
x := 0
d/dx(φ(x))
= 2.17
x := -2, -2 + 0.01 .. 0
# [plot: d/dx(f(x)) vs x]
x := 0
M :=
    d/dx(f(x))
    = 1.17
λ := -1/M = -0.854701
φ(x) := x + λ*(x + e^(0.7*x))
x := -2
d/dx(φ(x))
= -0.0022375
x := 0
d/dx(φ(x))
= -0.452991
метод_итерации(φ, a, b) :=
    x ← a
    n ← 0
    while |φ(x) - x| > 0.0001
        x ← φ(x)
        n ← n + 1
    [x; n; f(x)]
метод_итерации(φ, -2, 0) = [-0.639217; 7; 0.257812]
