# Занятие 8
# МАТЕМАТИЧЕСКИЕ МОДЕЛИ В ФОРМЕ СИСТЕМ ОБЫКНОВЕННЫХ ДИФФЕРЕНЦИАЛЬНЫХ УРАВНЕНИЙ И
# ДИФФЕРЕНЦИАЛЬНЫХ УРАВНЕНИЙ n-го ПОРЯДКА
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# Задание 1
ORIGIN := 1
solve block
    # constraints
    y1'(t) == 2*y1(t) - 3*y1(t)*y2(t)
    y1(0) == 2
    y2'(t) == 0.75*y1(t) - y1(t)*y2(t) + 1.7*sin(2.5)*t
    y2(0) == -0
    # solver
    [y1; y2] := odesolve([y1(t); y2(t)], 10)
end solve block
# [plot: y1(t), y2(t) vs t]
clear(t)
clear(y)
ORIGIN := 0
y := [3; -0.2; -0.1]
D(t, y) := [y[1]; y[2]; 0.5*y[2] - 1.3*y[1] + 4.7]
Yrkad := Rkadapt(y, 0, 10, 500, D)
Yrkad = [
    0, 3, -0.2, -0.1;
    0.02, 2.99599, -0.201015, -0.00128983;
    0.04, 2.99197, -0.200045, 0.0984131;
    0.06, 2.988, -0.197072, 0.199067;
    0.08, 2.9841, -0.192076, 0.300628;
    0.1, 2.98033, -0.185041, 0.403052;
    0.12, 2.97672, -0.175949, 0.506296;
    0.14, 2.9733, -0.164784, 0.610312;
    0.16, 2.97014, -0.151531, 0.715055;
    0.18, 2.96726, -0.136177, 0.820477
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]
t := Yrkad[:, 0]
y := Yrkad[:, 1]
# [plot: y vs t]
скорость_изм_y := Yrkad[:, 2]
# [plot: y, скорость_изм_y vs t]
# [plot: скорость_изм_y vs y]
