# Занятие 9
# РЕАЛИЗАЦИЯ ТИПОВЫХ МОДЕЛЕЙ СЛУЧАЙНЫХ ПОСЛЕДОВАТЕЛЬНОСТЕЙ ПРИ ФОРМИРОВАНИИ
# СТОХАСТИЧЕСКИХ МОДЕЛЕЙ ФИЗИЧЕСКИХ СИСТЕМ
# задание | 1
ORIGIN := 0
nn := 1200
y := rnorm(nn, 1, 0.5)
y = [
    0.927429; 0.961209; 1.00403; 1.23905; 2.15196; 1.55891; 1.82966; 0.82821; 0.671062; 0.891486
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]
i := 0 .. 999
# [plot: y[i] vs i]
m := 20
y_min := min(y) = -0.467533
y_max := max(y) = 2.54039
велич_интерввала := (y_max - y_min)/m = 0.150396
Gist := histogram(m, y)
Gist = [
    -0.392335, 6;
    -0.241939, 6;
    -0.0915431, 14;
    0.0588529, 38;
    0.209249, 38;
    0.359645, 59;
    0.510041, 87;
    0.660437, 119;
    0.810833, 139;
    0.961229, 145;
    1.11162, 142;
    1.26202, 123;
    1.41242, 95;
    1.56281, 70;
    1.71321, 57;
    1.8636, 29;
    2.014, 17;
    2.1644, 7;
    2.31479, 6;
    2.46519, 3
]
середина_инт := Gist[:, 0]
частота_попадания := Gist[:, 1]
# [plot: частота_попадания vs середина_инт]
# [plot: частота_попадания vs середина_инт]
частота_попадпния
y := sort(y)
y = [
    -0.467533; -0.432465; -0.347828; -0.347679; -0.343153; -0.335778; -0.316266; -0.285582; -0.265777; -0.254223
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]
# [plot: dnorm(y, 0, 1) vs y]
# [plot: dnorm(y, 0, 1), dnorm(y, 0, 2) vs y]
# задание | 2
clear(x, a, b, nn, i, y, m, середина_инт, частота_попадания, велич_интеграла, граница_инт, середина_инт)
ORIGIN := 0
nn := 1200
i := 1 .. 1000
a := 0
1
b := 5
x := runif(nn, a, b)
x = [
    3.16468; 0.371396; 1.96682; 2.98983; 1.49008; 0.469078; 3.20883; 1.88318; 1.04239; 2.76395
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]
# [plot: x[i] vs i]
m := 20
велич_интервала := (b - a)/m = 0.25
Gist := histogram(m, x)
Gist = [
    0.127862, 56;
    0.377689, 47;
    0.627515, 52;
    0.877342, 70;
    1.12717, 63;
    1.377, 64;
    1.62682, 57;
    1.87665, 55;
    2.12648, 57;
    2.3763, 66;
    2.62613, 58;
    2.87596, 64;
    3.12578, 59;
    3.37561, 52;
    3.62544, 55;
    3.87526, 71;
    4.12509, 59;
    4.37492, 60;
    4.62474, 61;
    4.87457, 74
]
середина_инт := Gist[:, 0]
частота_попадания := Gist[:, 1]
частота_инт := a, 0 + велич_интервала .. b
# [plot: частота_попадания, nn/m vs середина_инт, граница_инт]
попадания := частота_попадания/(nn*велич_интервала)
# [plot: частота_попадания vs середина_инт]
# [plot: dunif(x, a, b) vs x]
y =  # error: Эта переменная не определена. Проверьте правильность установки обозначения.
