# занятие 11
# ПОСТРОЕНИЕ  ЭМПИРИЧЕСКИХ  МОДЕЛЕЙ НА  ОСНОВЕ  АППРОКСИМАЦИИ  ДАННЫХ
# x = {1;  4;  7;  10;  13;  16;  19;  22;  25;  28;  31;  34}
# y = {13,5;  11,57;  11,2;  8,56;  8,79;  6,47;  6;  4,11;  3,98;  2;  0,33;  0,99}
ORIGIN := 1
X := [1; 4; 7; 10; 13; 16; 19; 22; 25; 28; 31; 34]
Y := [13.5; 11.57; 11.2; 8.56; 8.79; 6.47; 6; 4.11; 3.98; 2; 0.33; 0.99]
i := 1 .. 12
# [plot: Y[i] vs X[i]]
m := 10
M[1, 1] := sum(X[i]^4, i = 1 .. m)
M[1, 2] := sum(X[i]^3, i = 1 .. m)
M[1, 3] := sum(X[i]^2, i = 1 .. m)
M[2, 1] := sum(X[i]^3, i = 1 .. m)
M[2, 2] := sum(X[i]^2, i = 1 .. m)
M[2, 3] := sum(X[i], i = 1 .. m)
M[3, 1] := sum(X[i]^2, i = 1 .. m)
M[3, 2] := sum(X[i], i = 1 .. m)
M[3, 3] := m
M = [1476613, 62785, 2845; 62785, 2845, 145; 2845, 145, 10]
C[1] := sum(X[i]^2*Y[i], i = 1 .. m)
C[2] := sum(X[i]*Y[i], i = 1 .. m)
C[3] := sum(Y[i], i = 1 .. m)
C = [12956; 801.49; 76.18]
A := M^-1*C
A = [0.00171296; -0.457918; 13.7705]
# y=13.77-0.458x+0.002χ
полин_2_ст := polyfit(X, Y, 2)
xx := 4.6 + 0.01 .. 35
# [plot: X[i], xx vs Y[i], полин_2_ст(xx)]
M*A = [12956; 801.49; 76.18]
=
C = [12956; 801.49; 76.18]
