W(p) == (8*p + 1)/(1620*p^3 + 423*p^2 + 36*p + 1) == B(p)/A(p)*.
ORIGIN := 0
a[0] := 1
a[1] := 36
a[2] := 423
a[3] := 1620
коэфф_полин := [a[0]; a[1]; a[2]; a[3]]
λ := polyroots(коэфф_полин)
λ = [-0.111111; -0.0833333; -0.0666667]
x[1] == λ[1]*x[1] + u
x[2] == λ[2]*x[2] + u
x[3] == λ[3]*x[3] + u
X(t) == FX(t) + Gu(t)
X(t) == [x[1]; x[2]; x[3]]
F == [λ[1], 0, 0; 0, λ[2], 0; 0, 0, λ[3]]
G == [1; 1; 1]
x[1] == -0.111*x[1] + u
x[2] == -0.083*x[2] + u
x[3] == -0.067*x[3] + u
F := [-0.111, 0, 0; 0, -0.083, 0; 0, 0, -0.06]
A(p)*y(t) == B(p)*u(t)  # (12.5)
(p^3 + 53*p^2 + 162*p + 90)*y(t) == (5 p + 100)*u(t)  # (12.6)
y'''(t) + 53*y''(t) + 162*y'(t) + 90*y(t) == 5*u'(t) + 100*u(t)  # (12.7)
y(t) == x[1](t) == x[1]  # (12.8)
x[1]^''' + 53*x[1]^'' + 162*x[1]^' + 90*x[1] == 5*u' + 100*u  # (12.9)
x[1]^''' + 53*x[1]^'' + 162*x[1]^' - 5 == u' + 90*x + 100*u  # (12.10)
x[3]^' == -90*x[1] + 100*u  # (12.11)
x[1]^''' + 53*x[1]^'' + 162*x[1]^' - 5*u' == x[3]^'  # (12.12)
x[1]^'' + 53*x[1]^' == -162*x[1] + x[3] + 5*u  # (12.13)
x[2]^' == -162*x[1] + x[3] + 5*u  # (12.14)
x[1]^'' + 53*x[1]^' == x[2]^'  # (12.15)
x[1]^' == -53*x[1]^' + x[2]  # (12.16)
x[1]^' == -53*x[1]^' + x[2]
x[2]^' == -162*x[1] + x[3] + 5*u  # (12.17)
x[3]^' == -90*x[1] + 100*u
X(t) == FX(t) + Gu(t)  # (12.18)
X(t) == [x[1]; x[2]; x[3]]
F == [-53, 1, 0; 162, 0, 1; -90, 0, 0]
G == [0; 5; 100]
задания2
x[1](t) == i[1](t)*;
x[2](t) == u[C[2]](t)*;
x[3](t) == i[3](t)*;  # (12.19)
X(t) == |i[1](t)*u[C[2]](t)*i[3](t)|^T  # (12.20)
i[1]*R[1] + L[1]*di[1]/dt + u[C[2]] == e
(12.21)
L[3]*di[3]/dt*i[3]*R[3] == u[C[2]]
i[1] == i[2] + i[3]
(12.22)
i[2] == C[2]*du[C[2]]/dt
L[1]*di[1]/dt == e - i[1]*R[1] - u[C[2]]
L[3]*di[3]/dt == u[C[2]] - i[3]*R[3]  # (12.23)
C[2]*du[C[2]]/du == i[1] - i[3]
di[1]/dt == 1/L[1]*e - R[1]/L[1]*i[1] - 1/L[1]*u[C[2]]
du[C[2]]/dt == 1/C[2]*i[1] - 1/C[2]*i[3]  # (12.24)
di[3]/dt == 1/L[3]*u[C[2]] - R[3]/L[3]*i[3]
X(t) == FX(t) + Gu(t)  # (12.25)
X(t) == [di[1]/dt, du[C[2]]/dt, di[3]/dt]
G(t) == [1/L[1], 0, 0]
F == [-R[1]/L[1], -1/L[1], 0; 1/C[2], 0, -1/C[2]; 0, 1/L[3], -R[3]/L[3]]
u(t) == e
clear(e, x[1], x[2], x[3], R1, L1, C2, L2, C3, L3, t, D)  # error: Требуется имя переменной.
Origin := 1
R1 := 30
R3 := 10
L1 := 0.1
C2 := 0.006
L3 := 0.3
e := 100
x := [0; 0; 0]
D(t, x) := [1/L1*e - R1/L1*x[1] - 1/L1*x[2]; 1/C2*x[1] - 1/C2*x[3]; 1/L3*x[2] - R3/L3*x[3]]
Xrkad := rkadapt(x, 0, D, 0.3, 600, 5, 0.1)  # error: Системная ошибка: {0}
Xrkad =  # error: Эта переменная не определена. Проверьте правильность установки обозначения.
t := Xrkad^1
x[1] := Xrkad^2
x[2] := Xrkad^3
x[3] := Xrkad^4
Х_фаз_мр := augment(x[3], x[2], x[1])
задания5
G(t) := [1/L1; 0; 0]
F(t) := [-R1/L1, -1/L1, 0; 1/C2, 0, -1/C2; 0, 1/L3, -R3/L3]
u(t) := e
x := [0; 0; 0]
Х_пр_сост := statespace(x, 0, 0.3, 600, F, G, u)
Х_пр_сост = [
    0, 0, 0, 0;
    0.0005, 0.464274, 0.019829, 1.11018e-5;
    0.001, 0.863703, 0.0755737, 8.53347e-5;
    0.0015, 1.20716, 0.162205, 0.000276704;
    0.002, 1.50231, 0.275373, 0.000630645;
    0.0025, 1.75576, 0.41132, 0.00118515;
    0.003, 1.97323, 0.566796, 0.00197177;
    0.0035, 2.15964, 0.738997, 0.00301655;
    0.004, 2.31926, 0.925486, 0.00434087;
    0.0045, 2.45575, 1.12417, 0.00596192
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]
t := Х_пр_сост^1  # error: Эта матрица должна быть квадратной. Число строк должно равняться числу столбцов.
x[1] := Х_пр_сост^2  # error: Эта матрица должна быть квадратной. Число строк должно равняться числу столбцов.
x[2] := Х_пр_сост^3  # error: Эта матрица должна быть квадратной. Число строк должно равняться числу столбцов.
x[3] := Х_пр_сост^4  # error: Эта матрица должна быть квадратной. Число строк должно равняться числу столбцов.
Variant8
W(p) := (p^2 + 11*p)/(47*p^3 + 52*p^2 + 15.2*p + 1)
i[2](0) == 0
u[C1](0) == 0
R[3] == 10*Ом
e == 100*В
С[1] == 0.0008*Ф
L[2] == 0.2*Гн
