t := 1
f := 800
l := 20
R0 := 47  # Ом/км
L0 := 0.777*10^-3  # Гн/км
Rн := 500
C0 := 34*10^-9  # Ф/км
G0 := 0.674*10^-6  # См/км
ω := 2*π*f = 5026.55
Zн := 500
φн := 0
ω3 := 2*π*f*3 = 15079.6
# Входное напряжение:
U1 := 14.1*sin(ω*t) + 7.05*sin(ω3*t)
U1 = -5.3038e-12
φU1 := (arg(U1)/deg) = 180
# Решение
Zв := sqrt((R0 + 1j*ω*L0)/(G0 + 1j*ω*C0)) = 387.229 - 354.978i
γ1 := sqrt((R0 + 1j*ω*L0)*(G0 + 1j*ω*C0)) = 0.0609277 + 0.0659393i
a1 := 0.0609
B1 := 0.0659
Zв1 := sqrt((R0 + 1j*ω*L0)/(G0 + 1j*ω*C0)) = 387.229 - 354.978i
|Zв1| = 525.315
φвх1 := (arg(Zв1)/deg) = -42.5119
K := (Zн - Zв)/(Zн + Zв) = -0.0284237 + 0.388725i
|K| = 0.389763
φвх1 := (arg(K)/deg) = 94.182
Zвх := Zв*(1 + K*e^(-2*γ*l))/(1 - K*e^(-2*γ*l)) = 387.229 - 354.978i
|Zвх| = 525.315
φвх1 := (arg(Zвх)/deg) = -42.5119
I1 := U1/Zвх = -7.44244e-15 - 6.82258e-15i
U2 := 1/2*(U1 + I1*Zв)*e^(-γ*l) + 1/2*(U1 - I1*Zв)*e^(γ*l) = -4.99381e-17 - 1.99801e-17i
γ1 := sqrt((R0 + 1j*ω*L0)*(G0 + 1j*ω*C0))*20 = 1.21855 + 1.31879i
e^(γ1^l)
e := e^1.219*e^1.319i = 0.843054 + 3.2771i
eγ1l := e
|e| = 3.3838
φe := (arg(e)/deg) = 75.5731
e^(-γ1^l)
e2 := 1/e^1.219*e^(-1j*1.319) = -1.28537 + 0.0954589i
|e2| = 1.28891
φe := (arg(e2)/deg) = 175.753
e^(-2*γ1) = 1.64435 - 0.242734i
|e^(-2*γ1)| = 1.66217
φe := (arg(e^(-2*γ1))/deg) = -8.39722
K1 := (Zн - Zв1)/(Zн + Zв1) = -0.0284237 + 0.388725i
|K1| = 0.389763
φe := (arg(K1)/deg) = 94.182
Zвх := Zв1*(1 + K1*e^(-2*γ*l))/(1 - K1*e^(-2*γ*l)) = 387.229 - 354.978i
I1m1 := U1/Zвх = -7.44244e-15 - 6.82258e-15i
|I1m1| = 1.00964e-14
φI1m1 := (arg(I1m1)/deg) = -137.488
I1m1*Zв1 = -5.3038e-12 + 1.26258e-24i
U2m1 := 0.5*(U1 + I1m1 + I1m1*Zв1)*e^(-γ1) + 0.5*(U1 - I1m1*Zв1)^(-γ1) = -1.43482e28 - 1.1679e27i
|U2m1| = 1.43957e28
φU2m1 := (arg(U2m1)/deg) = -175.347
u2(t) := 1.193*sin(ω*t - 67.1)
I2m1 := U2m1/Zн = -2.86965e25 - 2.33579e24i
|I2m1| = 2.87914e25
φI2m1 := (arg(I2m1)/deg) = -175.347
Zв3 := sqrt((R0 + 1j*ω3*L0)/(G0 + 1j*ω3*C0)) = 242.331 - 189.08i
|Zв3| = 307.369
φZв3 := (arg(Zв3)/deg) = -37.9632
γ3 := sqrt((R0 + 1j*ω3*L0)*(G0 + 1j*ω3*C0)) = 0.097106 + 0.124118i
|γ3| = 0.157591
φγ3 := (arg(γ3)/deg) = 51.9615
a3 := 0.0971
B3 := 0.1241
γ3^l = 6.75915e-17 - 5.82833e-17i
|γ3^l| = 8.925e-17
φγ3l := (arg(γ3^l)/deg) = -40.7708
e^(-2*γ3^l) = 1
|e^(-2*γ3^l)| = 1
φ := (arg(e^(-2*γ3^l))/deg) = -2.07478e-15
K3 := (Zн - Zв3)/(Zн + Zв3) = 0.265035 + 0.322218i
|K3| = 0.417214
φK3 := (arg(K3)/deg) = 50.5616
Zвх3 := Zв3*(1 + K3*e^(-2*γ3^l))/(1 - K3*e^(-2*γ3^l)) = 500
|Zвх3| = 500
φвх3 := (arg(Zвх3)/deg) = 0
I1m3 := U1/Zвх3 = -1.06076e-14
|I1m3| = 1.06076e-14
φI1m3 := (arg(I1m3)/deg) = 180
I1m3*Zв3 = -2.57055e-12 + 2.00568e-12i
|I1m3*Zв3| = 3.26044e-12
φ := (arg(I1m3*Zв3)/deg) = 142.037
U2m3 := 0.5*(U1 + I1m3*Zв3)*e^(-γ3^l) + 0.5*(U1 - I1m3*Zв3)*e^(γ3^l) = -5.3038e-12
|U2m3| = 5.3038e-12
φ := (arg(U2m3)/deg) = -180
u23 := 4.609*10^-11*sin(ω3*t - 180)  # В
|u23| = 3.69251e-11
φ := (arg(u23)/deg) = 0
I2m3 := U2m3/Zн = -1.06076e-14
|I2m3| = 1.06076e-14
φ := (arg(I2m3)/deg) = -180
u1(t) := 40*sin(ω*t) + 20*sin(3*ω*t)
|u1(t)| = 1.50462e-11
φu2 := (arg(u1(t))/deg) = 180
u2(t) := 1.193*sin(ω*t - 67.1)
|u2(t)| = 1.0772
φu2 := (arg(u2(t))/deg) = 0
P1 := U1*I1m1/2*cos(φвх1) + U2m3*I2m3/2*cos(φвх3)*1 = 3.01081e-26 + 1.81311e-27i
|P1| = 3.01626e-26
φp1 := (arg(P1)/deg) = 3.4462
P2 := U2m1*I2m1/2*cos(φн) + U2m3*I2m3/2*cos(φн) = 2.04508e53 + 3.35145e52i
|P2| = 2.07236e53
φp1 := (arg(P2)/deg) = 9.30683
η := (-9.928*10^-4 - 2.14i*10^-24)/(-9.928*10^-25 + 0.001i)*100% = 0.9928i
u1(t) := 40*sin(ω*t) + 20*sin(3*ω*t)
|u1(t)| = 1.50462e-11
φu2 := (arg(u1(t))/deg) = 180
u2(t) := 1.193*sin(ω*t - 67.1)
|u2(t)| = 1.0772
φu2 := (arg(u2(t))/deg) = 0
λ1 := 2*π/B1 = 95.3442
Vф1 := ω/B1 = 76275.4
Vф3 := ω3/B3 = 121512
λ1 := 2*π/B3 = 50.63
Δt1 := l/Vф1 = 0.000262208
Δt3 := l/Vф3 = 0.000164593
f = 800
T := 1/f = 0.00125
t := 0, 0 + 0.07 .. 2.25
u1(t) := 14.1*sin(ω*t) + 7.05*sin(ω3*t)
# [plot: u1(t) vs t]
u2(t) := 4.28*sin(ω*t - 52°) + 1.33*sin(ω3*t - 128°)
# [plot: u2(t) vs t]
u1(t) := 14.1*sin(ω*t) + 7.05*sin(ω3*t)
u2(t) := 4.28*sin(ω*t - 52°) + 1.33*sin(ω3*t - 128°)
# [plot: u1(t), u2(t) vs t]
