t := 1
f := 1000
l := 36
R0 := 15  # Ом/км
L0 := 1*10^-3  # Гн/км
Rн := 550
C0 := 30*10^-9  # Ф/км
G0 := 10*10^-6  # См/км
ω := 2*π*f = 6283.19
Zн := 550
φн := 0
ω3 := 2*π*f*3 = 18849.6
# Входное напряжение:
U1 := 40*sin(ω*t) + 20*sin(ω3*t)
U1 = -4.60926e-11
φU1 := (arg(U1)/deg) = 180
# Решение
Zв := sqrt((R0 + 1j*ω*L0)/(G0 + 1j*ω*C0)) = 248.601 - 156.054i
γ1 := sqrt((R0 + 1j*ω*L0)*(G0 + 1j*ω*C0)) = 0.0319016 + 0.0452997i
a1 := 0.0609
B1 := 0.0659
Zв1 := sqrt((R0 + 1j*ω*L0)/(G0 + 1j*ω*C0)) = 248.601 - 156.054i
|Zв1| = 293.523
φвх1 := (arg(Zв1)/deg) = -32.1177
K := (Zн - Zв)/(Zн + Zв) = 0.326746 + 0.259259i
|K| = 0.417107
φвх1 := (arg(K)/deg) = 38.4305
Zвх := Zв*(1 + K*e^(-2*γ*l))/(1 - K*e^(-2*γ*l)) = 248.601 - 156.054i
|Zвх| = 293.523
φвх1 := (arg(Zвх)/deg) = -32.1177
I1 := U1/Zвх = -1.33e-13 - 8.3488e-14i
U2 := 1/2*(U1 + I1*Zв)*e^(-γ*l) + 1/2*(U1 - I1*Zв)*e^(γ*l) = -4.35607e-20 - 1.70949e-18i
γ1 := sqrt((R0 + 1j*ω*L0)*(G0 + 1j*ω*C0))*20 = 0.638032 + 0.905994i
e^(γ1^l)
e := e^1.219*e^1.319i = 0.843054 + 3.2771i
eγ1l := e
|e| = 3.3838
φe := (arg(e)/deg) = 75.5731
e^(-γ1^l)
e2 := 1/e^1.219*e^(-1j*1.319) = -1.28537 + 0.0954589i
|e2| = 1.28891
φe := (arg(e2)/deg) = 175.753
e^(-2*γ1) = -1.685 + 1.57084i
|e^(-2*γ1)| = 2.30364
φe := (arg(e^(-2*γ1))/deg) = 137.008
K1 := (Zн - Zв1)/(Zн + Zв1) = 0.326746 + 0.259259i
|K1| = 0.417107
φe := (arg(K1)/deg) = 38.4305
Zвх := Zв1*(1 + K1*e^(-2*γ*l))/(1 - K1*e^(-2*γ*l)) = 248.601 - 156.054i
I1m1 := U1/Zвх = -1.33e-13 - 8.3488e-14i
|I1m1| = 1.57033e-13
φI1m1 := (arg(I1m1)/deg) = -147.882
I1m1*Zв1 = -4.60926e-11
U2m1 := 0.5*(U1 + I1m1 + I1m1*Zв1)*e^(-γ1) + 0.5*(U1 - I1m1*Zв1)^(-γ1) = 9.22742e15 - 2.68904e15i
|U2m1| = 9.61125e15
φU2m1 := (arg(U2m1)/deg) = -16.2471
u2(t) := 1.193*sin(ω*t - 67.1)
I2m1 := U2m1/Zн = 1.67771e13 - 4.88916e12i
|I2m1| = 1.7475e13
φI2m1 := (arg(I2m1)/deg) = -16.2471
Zв3 := sqrt((R0 + 1j*ω3*L0)/(G0 + 1j*ω3*C0)) = 195.429 - 66.3368i
|Zв3| = 206.381
φZв3 := (arg(Zв3)/deg) = -18.7494
γ3 := sqrt((R0 + 1j*ω3*L0)*(G0 + 1j*ω3*C0)) = 0.0394669 + 0.109849i
|γ3| = 0.116724
φγ3 := (arg(γ3)/deg) = 70.2375
a3 := 0.0971
B3 := 0.1241
γ3^l = 2.58752e-34 + 3.89021e-35i
|γ3^l| = 2.6166e-34
φγ3l := (arg(γ3^l)/deg) = 8.55012
e^(-2*γ3^l) = 1
|e^(-2*γ3^l)| = 1
φ := (arg(e^(-2*γ3^l))/deg) = -4.45435e-32
K3 := (Zн - Zв3)/(Zн + Zв3) = 0.464066 + 0.130289i
|K3| = 0.482009
φK3 := (arg(K3)/deg) = 15.6824
Zвх3 := Zв3*(1 + K3*e^(-2*γ3^l))/(1 - K3*e^(-2*γ3^l)) = 550
|Zвх3| = 550
φвх3 := (arg(Zвх3)/deg) = 5.92161e-15
I1m3 := U1/Zвх3 = -8.38048e-14
|I1m3| = 8.38048e-14
φI1m3 := (arg(I1m3)/deg) = 180
I1m3*Zв3 = -1.63779e-11 + 5.55934e-12i
|I1m3*Zв3| = 1.72957e-11
φ := (arg(I1m3*Zв3)/deg) = 161.251
U2m3 := 0.5*(U1 + I1m3*Zв3)*e^(-γ3^l) + 0.5*(U1 - I1m3*Zв3)*e^(γ3^l) = -4.60926e-11
|U2m3| = 4.60926e-11
φ := (arg(U2m3)/deg) = 180
u23 := 4.609*10^-11*sin(ω3*t - 180)  # В
|u23| = 3.69251e-11
φ := (arg(u23)/deg) = 0
I2m3 := U2m3/Zн = -8.38048e-14
|I2m3| = 8.38048e-14
φ := (arg(I2m3)/deg) = 180
u1(t) := 40*sin(ω*t) + 20*sin(3*ω*t)
|u1(t)| = 4.60926e-11
φu2 := (arg(u1(t))/deg) = 180
u2(t) := 1.193*sin(ω*t - 67.1)
|u2(t)| = 1.0772
φu2 := (arg(u2(t))/deg) = 0
P1 := U1*I1m1/2*cos(φвх1) + U2m3*I2m3/2*cos(φвх3)*1 = 4.27222e-24 + 1.46941e-24i
|P1| = 4.51786e-24
φp1 := (arg(P1)/deg) = 18.9804
P2 := U2m1*I2m1/2*cos(φн) + U2m3*I2m3/2*cos(φн) = 7.08312e28 - 4.51143e28i
|P2| = 8.39784e28
φp1 := (arg(P2)/deg) = -32.4942
η := (-9.928*10^-4 - 2.14i*10^-24)/(-9.928*10^-25 + 0.001i)*100% = 0.9928i
u1(t) := 40*sin(ω*t) + 20*sin(3*ω*t)
|u1(t)| = 4.60926e-11
φu2 := (arg(u1(t))/deg) = 180
u2(t) := 1.193*sin(ω*t - 67.1)
|u2(t)| = 1.0772
φu2 := (arg(u2(t))/deg) = 0
λ1 := 2*π/B1 = 95.3442
Vф1 := ω/B1 = 95344.2
Vф3 := ω3/B3 = 151890
λ1 := 2*π/B3 = 50.63
Δt1 := l/Vф1 = 0.000377579
Δt3 := l/Vф3 = 0.000237014
f = 1000
T := 1/f = 0.001
t := 0, 0 + 0.07 .. 2.25
u1(t) := 14.1*sin(ω*t) + 7.05*sin(ω3*t)
# [plot: u1(t) vs t]
u2(t) := 4.28*sin(ω*t - 52°) + 1.33*sin(ω3*t - 128°)
# [plot: u2(t) vs t]
u1(t) := 14.1*sin(ω*t) + 7.05*sin(ω3*t)
u2(t) := 4.28*sin(ω*t - 52°) + 1.33*sin(ω3*t - 128°)
# [plot: u1(t), u2(t) vs t]
