μ_0 := 4*π*10^-7
b := 20
h := 2*b
μ := 376.98*10^-6
p_m := 0.1*10^-6
σ_m := 1/p_m = 10000000
μ_m := μ*μ_0 = 4.73727e-10
δ(f) := 1/sqrt(π*10*μ_m*σ_m) = 2.59216
k(g) := sqrt(1j*π*10*μ_m*σ_m) = 0.272787 + 0.272787i
Z(f) := k(g)*I[0](k(f)*a)/(2*π*a*σ[m]*I[1](k(f)*a))  # error: Эта переменная не определена. Проверьте правильность установки обозначения.
Z_ш := k(g)/(2*h*σ_m*tanh(k(g)*b)) = 3.40971e-10 + 3.40995e-10i
