I := [3.4; 7.0; 10.6; 14.2; 17.8; 19; 25]
U := [2.7; 5.6; 7.1; 8; 8.7; 9.2; 9.7]
R := U/I = [0.794118; 0.8; 0.669811; 0.56338; 0.488764; 0.484211; 0.388]
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f := 50
C := 47*10^-6
xL := 1/(2*π*f*C) = 67.7255
xC := xL
Ur := xC*I = [230.267; 474.079; 717.89; 961.702; 1205.51; 1286.78; 1693.14]
UL := xL*I = [230.267; 474.079; 717.89; 961.702; 1205.51; 1286.78; 1693.14]
URL := Ur + UL = [460.533; 948.157; 1435.78; 1923.4; 2411.03; 2573.57; 3386.28]
UL := sqrt(URL^2 - (I*R)^2) = [457.701; 946.785; 1434.87; 1922.73; 2410.49; 2573.06; 3385.89]
UC := UL = [457.701; 946.785; 1434.87; 1922.73; 2410.49; 2573.06; 3385.89]
ULC := |UL - I*xC| = 2772.13
U := sqrt(ULC^2 + (I*R)^2) = 2772.6
