f := 4000
R_e := 400
C_e := 0.2*10^-6
Z_x := R_e - 1i*1/(2*π*f*C_e) = 400 - 198.944i
|Z_x| = 446.742
φ := arg(Z_x)/deg = -26.4439
R_e := 456
C_e := 4.8*10^-6
Z_x := R_e - 1i*1/(2*π*f*C_e) = 456 - 8.28932i
|Z_x| = 456.075
φ := arg(Z_x)/deg = -1.04143
R_e := 166
C_e := 0.321*10^-6
Z_x := 10^5/R_e + 1i*2*π*f*C_e*10^5 = 602.41 + 806.761i
|Z_x| = 1006.86
φ := arg(Z_x)/deg = 53.2512
R_e := 500
C_e := 0.4*10^-6
Z_x := 10^5/R_e + 1i*2*π*f*C_e*10^5 = 200 + 1005.31i
|Z_x| = 1025.01
φ := arg(Z_x)/deg = 78.7483
S := (602.41 + 806.76i)/(20 + 1005.31i) = 0.814098 - 0.583032i
|S| = 1.00134
φ := arg(S)/deg = -35.6091
H := sqrt(S) = 0.952743 - 0.305976i
|H| = 1.00067
φ := arg(H)/deg = -17.8045
N := (1 + H)/(1 - H) = -0.013979 - 6.38418i
|N| = 6.3842
φ := arg(N)/deg = -90.1255
t := 1/(sqrt(1 + S)*sqrt(1 - S)) = 0.823289 - 0.424004i
|t| = 0.926058
φ := arg(t)/deg = -27.249
A_11 := t*sqrt((20 + 1005.30965i)/(400 - 198.94368i)) = 1.19827 + 0.703107i
|A_11| = 1.38932
φ := arg(A_11)/deg = 30.4031
A_12 := t*sqrt((456 - 8.28932i)*(602.40964 + 806.76099i)) = 627.413 - 12.5301i
|A_12| = 627.538
φ := arg(A_12)/deg = -1.14411
A_21 := t/sqrt((602.40964 + 806.76099i)*(20 + 1005.30965i)) = -0.000132937 - 0.000910717i
|A_21| = 0.000920368
φ := arg(A_21)/deg = -98.3048
A_22 := t*sqrt((400 - 198.94368i)/(20 + 1005.30965i)) = 0.0548598 - 0.614825i
|A_22| = 0.617268
φ := arg(A_22)/deg = -84.9011
Z1 := 446.74*e^(-1j*26.44)/(456.08*e^(-1j*1.04)) = 0.944747 - 0.25868i
|Z1| = 0.979521
φ := arg(Z1)/deg = -15.3128
Z2 := 1025*e^(1j*78)/(1007*e^(1j*53)) = 1.00892 - 0.134718i
|Z2| = 1.01787
φ := arg(Z2)/deg = -7.60551
