f := 400
Rэ := 1
Cэ := 0.384*10^-6
ω := 2*π*f = 2513.27
Zвх2 := Rэ + 1/(1j*ω*Cэ) = 1 - 1036.16i
(5.19)
[
    "f пб", "xx", 0, 0, 0, "кз", 0, 0, 0;
    0, "Хар-ер", "Rэ", "Сэ", "Zвх(беск)", "Хар-ер", "Rэ", "Сэ", "Zвх(ноль)";
    400, "е", 532, 0.466, □, "е", 494, 4.5, □;
    800, "е", 313, 0.433, □, "е", 494, 4.743, □;
    1200, "е", 259, 0.434, □, "е", 500, 1.432, □;
    1600, "е", 240, 0.472, □, "е", 495, 0.75, □;
    2000, "е", 231, 0.567, □, "е", 441, 0.464, □;
    2500, "е", 241, 0.7426, □, "е", 379, 0.315, □;
    3600, "е", 1, 0.03122, □, "е", 1, 0.03485, □;
    4200, "е", 1, 0.04442, □, "е", 1, 0.05214, □;
    4800, "е", 1, 0.05231, □, "е", 1, 0.06335, □
]
|Zвх2| = 1036.17
φ := (arg(Zвх2)/deg) = -89.9447
f := 400
Rэ := 10^6
Cэ := 0.3058*10^-6
Zвх1 := 100000/Rэ + 1*1j*ω*Cэ*10^5 = 0.1 + 76.8559i
|Zвх1| = 76.856
φ := (arg(Zвх1)/deg) = 89.9255  # (5.19)
f := 400
Rэ := 1
Cэ := 1.68*10^-6
[
    "f об", "xx", 0, 0, 0, "кз", 0, 0, 0;
    0, "Хар-ер", "Rэ", "Сэ", "Z'вх(беск)", "Хар-ер", "Rэ", "Сэ", "Z'вх(ноль)";
    400, "е", 532, 0.466, □, "е", 494, 4.5, □;
    800, "е", 313, 0.433, □, "е", 494, 4.743, □;
    1200, "е", 259, 0.434, □, "е", 500, 1.432, □;
    1600, "е", 240, 0.472, □, "е", 495, 0.75, □;
    2000, "е", 231, 0.567, □, "е", 441, 0.464, □;
    2500, "е", 241, 0.7426, □, "е", 379, 0.315, □;
    3600, "е", 1, 0.03122, □, "е", 1, 0.03485, □;
    4200, "е", 1, 0.04442, □, "е", 1, 0.05214, □;
    4800, "е", 1, 0.05231, □, "е", 1, 0.06335, □
]
Zвх2' := Rэ + 1/(1j*ω*Cэ) = 1 - 236.838i
(5.19)
|Zвх2'| = 236.84
φ := (arg(Zвх2')/deg) = -89.7581
f := 400
Rэ := 10^6
Cэ := 0.3*10^-6
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Zвх1' := 10^5/Rэ + 1j*ω*Cэ*10^5 = 0.1 + 75.3982i
(5.19)
|Zвх1'| = 75.3983
φ := (arg(Zвх1')/deg) = 89.924
Z := sqrt(Zвх1/Zвх2) = 0.000308602 + 0.272348i  # (5.17)
Z' := sqrt(Zвх1'/Zвх2') = 0.00156532 + 0.564224i  # (5.17)
|Z| = 0.272348
φ := (arg(Z)/deg) = 89.9351
|Z'| = 0.564226
φ := (arg(Z')/deg) = 89.841
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N := sqrt(Zвх1/Zвх2) = 0.000308602 + 0.272348i
.
Q := (1 + N)/(1 - N) = 0.862392 + 0.507375i
|Q| = 1.00057
Qφ := (arg(Q)/deg) = 30.4698
Zc1 := sqrt(Zвх1*Zвх2) = 282.198 - 0.0474146i
Zc2 := sqrt(Zвх2'*Zвх1') = 133.631 + 0.193497i
C := 3.5*10^-7
L := 0.04
C' := 3*10^-7
Lэ := L
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Сэ := C*C'/(C + C') = 1.61538e-7
Cэ := 1.615*10^-7
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fc := 1/(2*π*sqrt(Lэ*Cэ)) = 1980.18
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fбеск := 1/(2*π*sqrt(L*C)) = 1345.1
R := sqrt(L/C) = 338.062
k := fc/fбеск = 1.47214
R := sqrt(L/C') = 365.148
d := 1 - k = -0.472135
m := sqrt(1 - (fc/fбеск)^2) = 1.08036i
p := d^2
d^2 = 0.222912
sqrt(0.223) = 0.472229
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sqrt(p) = 0.472135
Ω := f/fc = 0.202002
m = 1.08036i
bэ := Qφ/2 = 15.2349
aэ := 10*log(|Q|) = 0.00249539
bt := asin(m*Ω/sqrt(1 - (1 - m^2)*Ω))*180/π = 16.4492i
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at := 8.7*acosh(m*Ω/sqrt(abs(1 - (1 - m^2)*Ω^2))) = 1.97169 + 13.6659i
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b/2
y := sin(π/180*bt/2)
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