Uзи := [0.8, 0.5, 0.25, 0, -0.2, -0.4, -0.8, -1]
Ic := [0.01, 0.01, 0.01, 0.01, 0.02, 0.02, 0.03]
Uси := [0, -0.3, -0.6, -0.9, -3, -6, -9]
ΔIc := (0.03 - 0.01)/7 = 0.00285714
ΔUзи := (0.8 - (-1))/8 = 0.225
ΔUси := (9 - (-0.9))/7 = 1.41429
Si := ΔIc/ΔUзи = 0.0126984
Ri := ΔUси/ΔIc = 495
K_p := P_вых/P_вх  # error: Эта переменная не определена. Проверьте правильность установки обозначения.
