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w := 2*π*4000 = 25132.7
Rэ := 166
Cэ := 0.321
Zвх(∞)
Zх := 10^5/Rэ + 1j*w*Cэ = 602.41 + 8067.61i
φ := (arg(Zх)/deg) = 85.7296
|Zх| = 8090.07
Rэ := 400
Cэ := 0.2
Zх := Rэ + 1/(1j*w*Cэ) = 400 - 0.000198944i
Zвх(0)
φ := (arg(Zх)/deg) = -2.84966e-5
|Zх| = 400
Zвх(02)
Rэ := 456
Cэ := 4.8
Zх := Rэ + 1/(1j*w*Cэ) = 456 - 8.28932e-6i
φ := (arg(Zх)/deg) = -1.04154e-6
|Zх| = 456
Rэ := 500
Cэ := 0.4
Zвх(∞2)
Zх := 10^5/Rэ + 1j*w*Cэ = 200 + 10053.1i
φ := (arg(Zх)/deg) = 88.8603
|Zх| = 10055.1
Zвх(0)
Zвх(02)
Zвх(∞)
Zвх(∞2)
456*e^(1j*(-1.042)*10^-6)/(1.006*10^4*e^88.86) = 1.16134e-40 - 1.21012e-46i
400*e^(1j*(-2.85)*10^-5)/(8.09*10^3*e^85.73) = 2.89765e-39 - 8.2583e-44i
