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w := 2*π*4000 = 25132.7
Rэ := 166
Cэ := 0.321*10^-6
Zx := 10^5/Rэ + 1j*w*Cэ*10^5 = 602.41 + 806.761i  # ХХПР
|Zx| = 1006.86
φ := (arg(Zx)/deg) = 53.2512
________________________________________________________________________________
Rэ := 400
Cэ := 0.2*10^-6
Zx := Rэ + 1/(1j*w*Cэ) = 400 - 198.944i  # КЗПР
|Zx| = 446.742
φ := (arg(Zx)/deg) = -26.4439
________________________________________________________________________________
Rэ := 500
Cэ := 0.4*10^-6
Zвх := (1007*e^(1j*53.251))/(446.742*e^(-1j*26.444)) = -0.910093 - 2.0622i
Zx := 10^5/Rэ + 1j*w*Cэ*10^5 = 200 + 1005.31i  # ХХОБ
|Zвх| = 2.2541
φ := (arg(Zвх)/deg) = -113.813
|Zx| = 1025.01
φ := (arg(Zx)/deg) = 78.7483
________________________________________________________________________________
Zвх := (1025*e^(1j*78.748))/(456.075*e^(-1j*1.041)) = -0.710408 - 2.1322i
Rэ := 456
Cэ := 4.8*10^-6
|Zвх| = 2.24744
Zx := Rэ + 1/(1j*w*Cэ) = 456 - 8.28932i  # КЗОБ
φ := (arg(Zвх)/deg) = -108.427
|Zx| = 456.075
φ := (arg(Zx)/deg) = -1.04143
