t1 := 0.4
R1 := 100
Tсв := 1
U := 8
f := 60
C := 3.3*10^-6
L := 10*10^-3
Rк := 11
Rc := 9
Rкр := 2*sqrt(L/C) = 110.096
T1 := t1/0.693 = 0.577201
ωсв := 2*π/Tсв = 6.28319
p1 := -1/T1 = -1.7325
U1m := 2.1*0.5
U2m := 0.4*0.5
δ := 1/Tсв*ln(U1m/U2m) = 1.65823
Ro := R1(10) + Rк + Rc  # error: Значение должно быть функцией, но имеет форму: Unitless.
Ro := 30
p1 := -830.3
p2 := -3800.9
T1 := 1/|p1| = 0.00120438
T2 := 1/|p2| = 0.000263096
Tсв := 2*π/ωсв = 1
ωсв := 2*π/Tсв
ωсв := 1.68
δ := 1/Tсв*ln(U1m/U2m)
δ := 1.50
