# Тип включения | F,Гц | Характер сопротивления | U,В | Rэ,Ом | Cэ,мкФ | Zвх,Ом
# ХХПР | 4000 | ИНД | 0,00054 | 166 | 0,321 |
# КЗПР | 4000 | ЕМК | 0 | 400 | 0,2 |
# ХХОБ | 4000 | ИНД | 0 | 500 | 0,4 |
# КЗОБ | 4000 | ЕМК | 0,0003 | 456 | 4,8 |
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w := 2*π*4000 = 25132.7
Rэ := 166
Cэ := 0.321*10^-6
Zx1 := 10^5/Rэ + 1j*w*Cэ*10^5 = 602.41 + 806.761i
|Zx1| = 1006.86
φx1 := (arg(Zx1)/deg) = 53.2512
Rэ := 400
Cэ := 0.2*10^-6
Zk1 := Rэ + 1/(1j*w*Cэ) = 400 - 198.944i
|Zk1| = 446.742
φk1 := (arg(Zk1)/deg) = -26.4439
Rэ := 500
Cэ := 0.4*10^-6
Zx2 := 10^5/Rэ + 1j*w*Cэ*10^5 = 200 + 1005.31i
|Zx2| = 1025.01
φx2 := (arg(Zx2)/deg) = 78.7483
Rэ := 456
Cэ := 4.8*10^-6
Zk2 := Rэ + 1/(1j*w*Cэ) = 456 - 8.28932i
|Zk2| = 456.075
φk2 := (arg(Zk2)/deg) = -1.04143
Zвх1 := Zk1/Zx1 = 0.0793716 - 0.436543i
|Zвх1| = 0.4437
φ1 := (arg(Zвх1)/deg) = -79.6951
Zвх2 := Zk2/Zx2 = 0.078872 - 0.437901i
|Zвх2| = 0.444947
φ2 := (arg(Zвх2)/deg) = -79.7897
|Zвх1| = 0.4437
φ1 = -79.6951
|Zвх2| = 0.444947
φ2 = -79.7897
# до суда всё правилно и провеино
# Находим вспомогательные величины
tanh(gc) := sqrt(Zk1/Zx1) = 0.511406 - 0.426807i
m := sqrt(Zk1/Zx1) = 0.511406 - 0.426807i
x := 0.511
y := 0.427
t := 1/(sqrt(1 + |x + 1j*y|)*sqrt(1 - |x + 1j*y|)) = 1.34044
# Расчитываем коэффиценты
A11 := t*sqrt(Zx1/Zx2) = 1.29577 - 0.293167i
A12 := sqrt(Zk1*Zx2) = 607.419 + 298.258i
A21 := t/sqrt(Zx1*Zx2) = 0.000536682 - 0.00120539i
A22 := t*sqrt(Zx2/Zx1) = 1.31913 + 0.298453i
A11*A22 - A12*A21 = 1.11127 + 0.57211i
Z1 := A12 = 607.419 + 298.258i
Z2 := 1/A21 = 308.26 + 692.356i
R1 := |Z1| = 676.695
R2 := |Z2| = 757.88
f := 4000
C := 1/(4000*π*25.13) = 3.16663e-6
C := 3.167*10^-6*1000 = 0.003167  # нФ
L := 1.59*10^-3
L := 1.59*10^-3*1000 = 1.59  # мГн
Zk1 := R1 + R2 + 1j*w*L + 1/(1j*w*C) = 1434.57 + 39961i
Zx1 := R2 + 1j*w*L = 757.88 + 39961.1i
Zx2 := R2 + 1/(1j*w*C) = 757.88 - 0.0125635i
Zk2 := ((R1 + 1j*w*L)*(R1 + 1/(1j*w*2*C)))/(R1 + 1j*w*L + R2 + 1/(1j*w*C)) = 676.235 + 12.811i
Zc1 := sqrt(Zk1*Zx1) = 1096.19 + 39962.5i
Zc2 := sqrt(Zk2*Zx2) = 715.926 + 6.77495i
N := (1 + Zc1)/(1 - Zc2) = -2.06421 - 55.8778i
|N| = 55.9159
φN := (arg(N)/deg) = -92.1156
59.684*e^(-j91.681)
ac := 10*log(1 + Zc1/Zc2) = 17.4728 + 6.58402i
Zн := 600
Zг := Zн
aог := 10*log(1 + Zc2/Zc1) = 0.00356184 - 0.0776654i
`
|aог| = 0.0777471
aон := 10*log(1 + Zc2/Zн) = 3.41086 + 0.0223591i
.
|aон| = 3.41093
δг := (Zн - Zc1)/(Zн + Zc2) = -0.533398 - 30.3656i
δн := (Zн - Zc2)/(Zн + Zc2) = -0.0881191 - 0.00469475i
aвз := 20*log(|1 - δг*δн*e^(-0.23*ac)*e^(-1j*2*φN)|) = 0.219641
# Тип включения | F,Гц | Характер сопротивления | U,В | Rэ,Ом | Cэ,мкФ | Zвх,Ом
# ХХПР | 4000 | ИНД | 0,00054 | 166 | 0,321 |
# КЗПР | 4000 | ЕМК | 0 | 400 | 0,2 |
# ХХОБ | 4000 | ИНД | 0 | 500 | 0,4 |
# КЗОБ | 4000 | ЕМК | 0,0003 | 456 | 4,8 |
Rг/Zн
"="  # Zг/Zн
"=>"
Rг := Zг
Rг/Zн = 1
10*log(|Rг/Zн|) = 0
"="
10*log(|Zг/Zн|) = 0
ap := ac + aог + aон + aвз = 21.1069 + 6.52871i
|ap| = 22.0936
# [plot: ap vs Zн]
# [plot: aс, |аог|, |aон|, aвз vs Zн]
