w := 2*3.141529*4000 = 25132.2
Zx1 := 10^5/166 + 1j*2.513*10^4*0.321*10^-6*10^5 = 602.41 + 806.673i
|Zx1| = 1006.79
φx1 := (arg(Zx1)/deg) = 53.2483
Zk1 := 400 + 1/(1j*2.513*10^4*0.2*10^-6) = 400 - 198.965i
|Zk1| = 446.752
φk1 := (arg(Zk1)/deg) = -26.4464
Zx2 := 10^5/500 + 1j*2.513*10^4*0.4*10^-6*10^5 = 200 + 1005.2i
|Zx2| = 1024.9
φx1 := (arg(Zx2)/deg) = 78.7471
Zk2 := 456 + 1/(1j*2.513*10^4*4.8*10^-6) = 456 - 8.29022i
|Zk2| = 456.075
φk1 := (arg(Zk1)/deg) = -26.4464
w
Zвх1 := Zk1/Zx1 = 0.0793828 - 0.436582i
Zвх2 := Zk2/Zx2 = 0.0788886 - 0.437945i
|Zвх1| = 0.44374
φ1 := (arg(Zвх1)/deg) = -79.6946
|Zвх2| = 0.444993
φ2 := (arg(Zвх2)/deg) = -79.7886
Zk1 = 400 - 198.965i
Zx1 = 602.41 + 806.673i
tan(g_c) := sqrt(Zk1/Zx1) = 0.511431 - 0.426824i
t := 1/(sqrt(1 + 0.511 - 1j*0.427)*sqrt(1 - 0.511 + 1j*0.427)) = 0.966333 - 0.21731i
Zx1 = 602.41 + 806.673i
Zx2 = 200 + 1005.2i
t = 0.966333 - 0.21731i
.
A11 := t*sqrt(Zx1/Zx2) = 0.886608 - 0.421435i
Zx1 = 602.41 + 806.673i
□ := Z_вх^∞  # error: Отсутствует элемент или выражение.
Zx2 = 200 + 1005.2i
□ := Z'_вх^∞  # error: Отсутствует элемент или выражение.
A12 := t*sqrt(Zk1*Zk2) = 400.398 - 198.915i
Zk1 = 400 - 198.965i
□ := Z_вх^0  # error: Отсутствует элемент или выражение.
Zk2 = 456 - 8.29022i
□ := Z'_вх^0  # error: Отсутствует элемент или выражение.
A21 := t/sqrt(Zx1*Zx2) = 0.000191533 - 0.000956059i
A22 := t*sqrt(Zx2/Zx1) = 0.999337 + 0.00131693i
# Zx2/Zx1 | Zx1/Zx2
A11*A22 - A12*A21 = 1.00006 + 0.000915133i
. := 1
Zc1 := sqrt(A11*A12/(A21*A22)) = 652.922 + 155.276i
Zc2 := sqrt(A22*A12/(A21*A11)) = 531.88 + 428.81i
N := (1 + Zc1)/(1 - Zc2) = -0.8884 + 0.425102i
|N| = 0.984869
φN := (arg(N)/deg) = 154.429
Zг := 600
Zн := Zг
Rг := Zг
A := A11
B := 12
C := A21
D := A22
[V_1; I_1] := [A, B; C, D] = [0.886608 - 0.421435i; 0.000191533 - 0.000956059i]
A := [A, B; C, D] = [0.886608 - 0.421435i, 12; 0.000191533 - 0.000956059i, 0.999337 + 0.00131693i]
a_c := 10*log(1 + Zc1/Zc2) = 2.86333 - 0.957626i
a_ог := 10*log(1 + Zc2/Zc1) = 2.94079 + 0.975151i
|a_ог| = 3.09825
a_он := 10*log(1 + Zc2/Zн) = 3.04772 + 1.57275i
|a_он| = 3.4296
δг := (Zн - Zc1)/(Zн + Zc2) = -0.0863365 - 0.104476i
δн := (Zн - Zc2)/(Zн + Zc2) = -0.0728822 - 0.351236i
a_вз := 20*log(|1 - δг*δн*e^(-0.23*a_c)*e^(-1j*2*φN)|) = -0.0159653
a_р := a_c + a_ог + a_вз + a_он = 8.83588 + 1.59028i
Rг/Zн = 1
10*log(Rг/Zн) = 0
P_U := 20*log(2) = 6.0206
P_E := a_р + P_U = 14.8565 + 1.59028i
|Zн/Zc2| = 0.878208
0.4 ≤ 0.878 ≤ 2.5
