# Тип включения | F,Гц | Характер сопротивления | U,В | Rэ,Ом | Cэ,мкФ | Zвх,Ом
# ХХПР | 4000 | ИНД | 0,00054 | 166 | 0,321 |
# КЗПР | 4000 | ЕМК | 0 | 400 | 0,2 |
# ХХОБ | 4000 | ИНД | 0 | 500 | 0,4 |
# КЗОБ | 4000 | ЕМК | 0,0003 | 456 | 4,8 |
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w := 2*π*4000 = 25132.7
Rэ := 166
Cэ := 0.321*10^-6
Zx1 := 10^5/Rэ + 1j*w*Cэ*10^5 = 602.41 + 806.761i
|Zx1| = 1006.86
φx1 := (arg(Zx1)/deg) = 53.2512
Rэ := 400
Cэ := 0.2*10^-6
Zk1 := Rэ + 1/(1j*w*Cэ) = 400 - 198.944i
|Zk1| = 446.742
φk1 := (arg(Zk1)/deg) = -26.4439
Rэ := 500
Cэ := 0.4*10^-6
Zx2 := 10^5/Rэ + 1j*w*Cэ*10^5 = 200 + 1005.31i
|Zx2| = 1025.01
φx2 := (arg(Zx2)/deg) = 78.7483
Rэ := 456
Cэ := 4.8*10^-6
Zk2 := Rэ + 1/(1j*w*Cэ) = 456 - 8.28932i
|Zk2| = 456.075
φk2 := (arg(Zk2)/deg) = -1.04143
Zвх1 := Zk1/Zx1 = 0.0793716 - 0.436543i
|Zвх1| = 0.4437
φ1 := (arg(Zвх1)/deg) = -79.6951
Zвх2 := Zk2/Zx2 = 0.078872 - 0.437901i
|Zвх2| = 0.444947
φ2 := (arg(Zвх2)/deg) = -79.7897
|Zвх1| = 0.4437
φ1 = -79.6951
|Zвх2| = 0.444947
φ2 = -79.7897
# до суда всё правилно и провеино
# Находим вспомогательные величины
tanh(gc) := sqrt(Zk1/Zx1) = 0.511406 - 0.426807i
m := sqrt(Zk1/Zx1) = 0.511406 - 0.426807i
x := 0.511
y := 0.427
t := 1/(sqrt(1 + x + 1j*y)*sqrt(1 - x + 1j*y)) = 0.870818 - 0.471909i
# Расчитываем коэффиценты
A11 := t*sqrt(Zx1/Zx2) = 0.738585 - 0.646637i
A12 := t*sqrt(Zk1*Zx2) = 669.702 - 26.9179i
A21 := t/sqrt(Zx1*Zx2) = -7.57091e-5 - 0.000972026i
A22 := t*sqrt(Zx2/Zx1) = 0.962045 - 0.270516i
A11*A22 - A12*A21 = 0.612494 - 0.172964i
□ := 1 - 0j  # error: Отсутствует элемент или выражение.
□ := 1 + 0j  # error: Отсутствует элемент или выражение.
□ := 1  # error: Отсутствует элемент или выражение.
Z1 := A12 = 669.702 - 26.9179i
Z2 := 1/A21 = -79.6463 + 1022.58i
R1 := |Z1| = 670.243
R2 := |Z2| = 1025.67
f := 4000
(3.8)
Zc1 := sqrt(A11*A12/(A21*A22))
(3.8)
Zc2 := sqrt(A22*A12/(A21*A11)) = 433.058 + 715.755i
Zг := 600
Zн := Zг
Zн = 600
|Zн/Zc2| = 0.717217
0.4 ≤ 0.717
0.717 ≤ 2.5
# если он междуними или равнен им aвз не нужен
N := (1 + x + 1j*y)/(1 - (-x) - 1j*y) = 0.852093 + 0.523391i  # (3.27)
ac := 10*log(|N|) = 0  # (3.21)  # (3.28)
aог := 10*log(1 + Zc2/Zc1) = 2.94088 + 0.9751i
`
|aог| = 3.09832
aон := 10*log(1 + Zc2/Zн) = 3.21111 + 2.63144i
.
|aон| = 4.15159
ap := ac + aог + aон = 6.15199 + 3.60654i  # (4.5)
|ap| = 7.13121
φ := (arg(ap)/deg) = 30.3805
# Тип включения | F,Гц | Характер сопротивления | U,В | Rэ,Ом | Cэ,мкФ | Zвх,Ом
# ХХПР | 4000 | ИНД | 0,00054 | 166 | 0,321 |
# КЗПР | 4000 | ЕМwК | 0 | 400 | 0,2 |
# ХХОБ | 4000 | ИНД | 0 | 500 | 0,4 |
# КЗОБ | 4000 | ЕМК | 0,0003 | 456 | 4,8 |
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