Ac := 0.575
i := sqrt(-1)
Zн := 4.638
Zc1 := 371.406 + i*82.426
Zc2 := 317.031 - i*108.56
fc := -148.6 deg
A1 := 20*log(|(600 + Zc1)/(2*sqrt(600*Zc1))|) = 0.17417
A2 := 20*log(|(Zн + Zc2)/(2*sqrt(Zн*Zc2))|) = 12.681
бг := (600 - Zc1)/(600 + Zc1) = 0.226492 - 0.104071i
бн := (Zн - Zc2)/(Zн + Zc2) = -0.974112 + 0.00873708i
A3 := 20*log(|1 - бг*бн*e^(-0.23*Ac)*e^(-i*2*fc)|) = 0.253728
A4 := Ac + A1 + A2 + A3 = 13.6839
х := 0.869
y := -1j*0.397
t := 1/sqrt(1 + |х + 1j*y|*|1 - 1*х + 1j*y|)
Zвх^° =  # error: Эта переменная не определена. Проверьте правильность установки обозначения.
Zвх^∞ =  # error
Zвх^`° =  # error
tanh(y_c) := (e_yc - e^(-1*yc))/(e^yc + e^(-yc))
Zвх^`∞ =  # error
sqrt(Zвх°/Zвх^∞) =  # error
t := 1/sqrt(1 + |0.869 - 1j*0.397|*sqrt(1 - |0.869 - 1j*0.397|)) = 0.912191
A11 := t*sqrt(Zвх^∞/Zвх^`∞)
A12 := t*sqrt(Zвх^°)
A21 := t/sqrt(Zвх^∞*Zвх^`∞)
A22 := t*sqrt(Zвх^∞/Zвх^∞)
A11*A22 - A12*A21 =  # error
Z_1 := A12
Z_2 := 1/A21
