# Тип включения | F,Гц | Характер сопротивления | U,В | Rэ,Ом | Cэ,мкФ | Zвх,Ом
# ХХПР | 4000 | ИНД | 0,00054 | 166 | 0,321 |
# КЗПР | 4000 | ЕМК | 0 | 400 | 0,2 |
# ХХОБ | 4000 | ИНД | 0 | 500 | 0,4 |
# КЗОБ | 4000 | ЕМК | 0,0003 | 456 | 4,8 |
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w := 2*π*4000 = 25132.7
Rэ := 166
Cэ := 0.321*10^-6
Zx1 := 10^5/Rэ + 1j*w*Cэ*10^5 = 602.41 + 806.761i
|Zx1| = 1006.86
φx1 := (arg(Zx1)/deg) = 53.2512
Rэ := 400
Cэ := 0.2*10^-6
Zk1 := Rэ + 1/(1j*w*Cэ) = 400 - 198.944i
|Zk1| = 446.742
φk1 := (arg(Zk1)/deg) = -26.4439
Rэ := 500
Cэ := 0.4*10^-6
Zx2 := 10^5/Rэ + 1j*w*Cэ*10^5 = 200 + 1005.31i
|Zx2| = 1025.01
φx2 := (arg(Zx2)/deg) = 78.7483
Rэ := 456
Cэ := 4.8*10^-6
Zk2 := Rэ + 1/(1j*w*Cэ) = 456 - 8.28932i
|Zk2| = 456.075
φk2 := (arg(Zk2)/deg) = -1.04143
Zвх1 := Zk1/Zx1 = 0.0793716 - 0.436543i
|Zвх1| = 0.4437
φ1 := (arg(Zвх1)/deg) = -79.6951
Zвх2 := Zk2/Zx2 = 0.078872 - 0.437901i
|Zвх2| = 0.444947
φ2 := (arg(Zвх2)/deg) = -79.7897
|Zвх1| = 0.4437
φ1 = -79.6951
|Zвх2| = 0.444947
φ2 = -79.7897
# до суда всё правилно и провеино
# Находим вспомогательные величины
tanh(gc) := sqrt(Zx1/Zk1) = 1.15259 + 0.961927i
m := sqrt(Zx1/Zk1) = 1.15259 + 0.961927i
x := 1.153
y := 1j*0.962
t := 1/(sqrt(1 + |x + 1j*y|)*sqrt(1 - |x + 1j*y|)) = 1.01876
# Расчитываем коэффиценты
A11 := t*sqrt(Zk1/Zk2) = 0.983605 - 0.221687i
A12 := sqrt(Zx1*Zx2) = 413.205 + 928.063i
A21 := t/sqrt(Zk1*Zk2) = 0.00219235 + 0.000536165i
A22 := t*sqrt(Zk1/Zk2) = 0.983605 - 0.221687i
A11*A22 - A12*A21 = 0.510041 - 2.69229i
Z1 := A12 = 413.205 + 928.063i
Z2 := 1/A21 = 430.391 - 105.257i
R1 := |Z1| = 1015.89
R2 := |Z2| = 443.075
f := 4000
C := 1/(4000*π*25.13) = 3.16663e-6
C := 3.167*10^-6*1000 = 0.003167  # нФ
L := 1.59*10^-3
L := 1.59*10^-3*1000 = 1.59  # мГн
Zk1 := R1 + R2 + 1j*w*L + 1/(1j*w*C) = 1458.97 + 39961i
Zx1 := R2 + 1j*w*L = 443.075 + 39961.1i
Zx2 := R2 + 1/(1j*w*C) = 443.075 - 0.0125635i
Zk2 := ((R1 + 1j*w*L)*(R1 + 1/(1j*w*2*C)))/(R1 + 1j*w*L + R2 + 1/(1j*w*C)) = 1015.48 + 11.2426i
Zc1 := sqrt(Zx1*Zk1) = 950.945 + 39964.3i
Zc2 := sqrt(Zk2*Zx2) = 670.782 + 3.70356i
N := (1 + Zc1)/(1 - Zc2) = -1.75115 - 59.6579i
|N| = 59.6836
φN := (arg(N)/deg) = -91.6813
59.684*e^(-j91.681)
Zн := 600
Zг := Zн
.
U1 := sqrt(Zс1/Zс2)*coth(gс)*U2 + sqrt(Zс1*Zс2)*sinh(gс)*I2  # error: Эта переменная не определена. Проверьте правильность установки обозначения.
δг := (Zг - Zc1)/(Zг + Zc1) = -0.998836 - 0.0299817i
δн := (Zн - Zc2)/(Zн + Zc2) = -0.0557077 - 0.00275204i
aс := 10*log(|N|) = 17.7585
φс := φN = -91.6813
aв3 := 20*log(|1 - δг*δн*e^(-0.23*aс)*e^(-1j*2*φс)|) = -0.00272321
