# Тип включения | F,Гц | Характер сопротивления | U,В | Rэ,Ом | Cэ,мкФ | Zвх,Ом
# ХХПР | 4000 | ИНД | 0,00054 | 166 | 0,321 |
# КЗПР | 4000 | ЕМК | 0 | 400 | 0,2 |
# ХХОБ | 4000 | ИНД | 0 | 500 | 0,4 |
# КЗОБ | 4000 | ЕМК | 0,0003 | 456 | 4,8 |
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w := 2*π*4000 = 25132.7
Rэ := 166
Cэ := 0.321*10^-6
Zx1 := 10^5/Rэ + 1j*w*Cэ*10^5 = 602.41 + 806.761i
Rвых := 600
Rвх := Rвых
|Zx1| = 1006.86
φx1 := (arg(Zx1)/deg) = 53.2512
Rэ := 400
Cэ := 0.2*10^-6
Zk1 := Rэ + 1/(1j*w*Cэ) = 400 - 198.944i
|Zk1| = 446.742
φk1 := (arg(Zk1)/deg) = -26.4439
Rэ := 500
Cэ := 0.4*10^-6
Zx2 := 10^5/Rэ + 1j*w*Cэ*10^5 = 200 + 1005.31i
|Zx2| = 1025.01
φx2 := (arg(Zx2)/deg) = 78.7483
Zг := 600
Zн := Zг
Rэ := 456
Cэ := 4.8*10^-6
Zk2 := Rэ + 1/(1j*w*Cэ) = 456 - 8.28932i
|Zk2| = 456.075
φk2 := (arg(Zk2)/deg) = -1.04143
Zвх1 := Zk1/Zx1 = 0.0793716 - 0.436543i
|Zвх1| = 0.4437
φ1 := (arg(Zвх1)/deg) = -79.6951
Zвх2 := Zk2/Zx2 = 0.078872 - 0.437901i
|Zвх2| = 0.444947
φ2 := (arg(Zвх2)/deg) = -79.7897
|Zвх1| = 0.4437
φ1 = -79.6951
|Zвх2| = 0.444947
φ2 = -79.7897
2.25*e^80j - 2.25*e^80j = 0
# до суда всё правилно и провеино
# Находим вспомогательные величины
tanh(gc) := sqrt(Zk1/Zx1) = 0.511406 - 0.426807i
m := sqrt(Zk1/Zx1) = 0.511406 - 0.426807i
x := 0.511
y := 1j*0.427
t := 1/(sqrt(1 + x + 1j*y)*sqrt(1 - x - 1j*y)) = 1.00355
# Расчитываем коэффиценты
A11 := t*sqrt(Zx1/Zx2) = 0.970101 - 0.219485i
A12 := t*sqrt(Zk1*Zx2) = 609.573 + 299.316i
A21 := t/sqrt(Zx1*Zx2) = 0.000401797 - 0.000902441i
A22 := t*sqrt(Zx2/Zx1) = 0.987592 + 0.223442i
A11*A22 - A21*A12 = 0.492066 + 0.42984i
A11 = 0.970101 - 0.219485i
A22 = 0.987592 + 0.223442i
A11 == A22 = 0
Z1 := A12 = 609.573 + 299.316i
Z2 := 1/A21 = 411.745 + 924.783i
R1 := |Z1| = 679.095
R2 := |Z2| = 1012.3
f := 4000
C := 1/(4000*π*25.13) = 3.16663e-6
C := 3.167*10^-6*1000 = 0.003167  # нФ
C := 1/(4000*π*2) = 3.97887e-5
C := 3.979*(10^-5)*1000 = 0.03979  # нФ
L := 1.59*10^-3
L := 1.59*10^-3*1000 = 1.59  # мГн
Zx1 := R1 + R2 + 1j*w*L + 1/(1j*w*C) = 1691.4 + 39961.1i
Zk1 := R2 + 1j*w*L = 1012.3 + 39961.1i
Zx2 := R2 + 1/(1j*w*C) = 1012.3 - 0.000999968i
Zk2 := ((R1 + 1j*w*L)*(R1 + 1/(1j*w*2*C)))/(R1 + 1j*w*L + R2 + 1/(1j*w*C)) = 678.368 + 17.1717i
Zc1 := sqrt(Zk1*Zx1) = 1351.8 + 39962.5i
Zc2 := sqrt(Zk2*Zx2) = 828.748 + 10.4871i
N := (1 + Zc1)/(1 - Zc2) = -2.24562 - 48.2501i
|N| = 48.3023
φN := (arg(N)/deg) = -92.6647
Zг := Zн
Zн := 600
ac := 10*log(1 + Zc1/Zc2) = 16.8395 + 6.53025i
aог := 10*log(1 + Zc2/Zc1) = 0.00510845 - 0.0898239i
|aог| = 0.089969
aон := 10*log(1 + Zc2/Zн) = 3.76816 + 0.0318769i
.
|aон| = 3.7683
δг := (Zн - Zc1)/(Zн + Zc2) = -0.73146 - 27.9649i
δн := (Zн - Zc2)/(Zн + Zc2) = -0.160149 - 0.00616455i
|Zн/Zc2| = 0.723925
aвз := 20*log(|1 - δг*δн*e^(-0.23*ac)*e^(-1j*2*φN)|) = 0.773128
# Тип включения | F,Гц | Характер сопротивления | U,В | Rэ,Ом | Cэ,мкФ | Zвх,Ом
# ХХПР | 4000 | ИНД | 0,00054 | 166 | 0,321 |
# КЗПР | 4000 | ЕМК | 0 | 400 | 0,2 |
# ХХОБ | 4000 | ИНД | 0 | 500 | 0,4 |
# КЗОБ | 4000 | ЕМК | 0,0003 | 456 | 4,8 |
ap := ac + aог + aон + aвз = 21.3859 + 6.47231i
|ap| = 22.3439
# [plot: ap vs Zн]
# [plot: aс, |аог|, |aон|, aвз vs Zн]
