8
L := 0.033
L1 := 0.0586
C1 := 9.47098*10^-8
w := 1 .. 50000
P[w] := (-w)^3*L1*C1*L + w*(L1 + L)
D[w] := -w^2*L1*C1 + 1
Z1[w] := P[w]/D[w]
Z1[23710] = 127.052
Z2[w] := -10000000/(w*3.3)
Z2[23710] = -127.807
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Zxx1[w] := Z1[w] + Z2[w]
Zxx1[22400] = -131.551
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ZL[w] := 0.1089*w^4 - 6.445*w^2*10^7 + 1.8*10^15
ZP[w] := -ZL[w]/(-3.3*w^3 + 3.3*1.8*w*10^8)
ZP[5000] = -100.415
ZN[w] := 0.1089*(-w^2 + 2.961*10^7)*(-w^2 + 56.22*10^7)
ZN[5442] = -3.11104e11
ZP1[w] := -ZN[w]/(-3.3*w^3 + 3.3*1.8*w*10^8)
ZP1[5000] = -105.451
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ZKZ[w] := 10^7*w*(-w^2 + 5*10^8)/(3.3*(-w^2 + 2.961*10^7)*(-w^2 + 56.22*10^7))
ZXX[w] := Z2[w]
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ZKZ[5000] = 2906.11
A11[w] := 0.1089*10^-7*(-w^2 + 2.961*10^7)*(-w^2 + 56.22*10^7)/(-w^2 + 1.8*10^8)
A11[5000] = 0.173994
A12[w] := 0.033*w*(-w^2 + 5*10^8)/(-w^2 + 1.8*10^8)
A12[5000] = 505.645
A21[w] := -3.3*w*10^-7
A21[5000] = -0.00165
A22[w] := 1
A22[5000] = 1
Zc1[w] := sqrt((-w^2 + 2.961*10^7)*(-w^2 + 56.22*10^7)*(-w^2 + 5*10^8))/((-w^2 + 1.8*10^8)*30.317)
Zc1[5441] = 8.15529
Zc2[w] := 10^7/3.3*sqrt((-w^2 + 5*10^8)/((-w^2 + 2.961*10^7)*(-w^2 + 56.22*10^7)))
Zc2[40000] = 78.7267i
ImZc1[w] := -1i*sqrt((-w^2 + 2.961*10^7)*(-w^2 + 56.22*10^7)*(-w^2 + 5*10^8))/((-w^2 + 1.8*10^8)*30.317)
ImZc2[w] := -1i*10^7/3.3*sqrt((-w^2 + 5*10^8)/((-w^2 + 2.961*10^7)*(-w^2 + 56.22*10^7)))
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Gc[w] := ln(sqrt(A11[w]*A22[w]) + sqrt(A12[w] + A21[w]))
Gc[5000] = 3.1313
9
Ac[w] := ln(|sqrt(A11[w]*A22[w]) + sqrt(A12[w] + A21[w])|)
Ac[40000] = 3.47109
Imc[w] := -1i*(Gc[w] - Ac[w])
Imgradc[w] := -1i*(Gc[w] - Ac[w])*180/π
Imgradc[40000] = 6.30894
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Ic[18000] := □  # error: Пустой местозаполнитель.
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