U_1o := [250, 220, 130, 180, 130, 100]
S_H := 75
I_2k := 4.2
P_o := [55, 39, 29.5, 31.5, 15.5, 10]
I_1k := 0.36
P_k.H := 3.6
U_1 := [0, 0.25, 0.5, 0.75, 1, 1.5]
U_2H := 18
U_1k := 18.8
I_1 := [77, 79.5, 63, 55.5, 45, 36]
I_2H := 4.2
U_1H := 220
U_2 := [17.5, 17.75, 18, 19.2, 19.2, 18.5]
cosφ_2 := 1
I_2 := [4.4, 4, 3.5, 3, 2.5, 4.8]
I_1H := I_1k
I_2H := I_2k
U_k := U_1k
I_1H := I_1k
I_2a := I_2
I_2p := 0
P_c := P_o
U_2o := [120, 105, 91.5, 76.5, 68.5, 48]
I_2o := [91, 67.5, 54.5, 43.5, 36, 27]
P_2 := U_2*I_2  # error: Размерности массива не совпадают.
P_2 := 17.5*4.4 = 77
P_2 := 17.75*4 = 71
P_2 := 18*3.5 = 63
P_2 := 19.2*3 = 57.6
P_2 := 19.2*2.5 = 48
P_2 := 18.5*4.8 = 88.8
u_k := U_1k/U_1H*100 = 8.54545
k_H := I_2/I_2H = [1.04762, 0.952381, 0.833333, 0.714286, 0.595238, 1.14286]
P_2 := [77, 71, 63, 57.6, 48, 88.8]
P_1 := [83.5, 78, 70, 62, 51, 40]
η := P_2/P_1*100 = [92.2156, 91.0256, 90, 92.9032, 94.1176, 222]
k := U_1o/U_2o = [2.08333, 2.09524, 1.42077, 2.35294, 1.89781, 2.08333]
z_o := U_2o/I_2o*k^2  # error: Эта матрица должна быть квадратной. Число строк должно равняться числу столбцов.
z_o := 120/91*2.083^2 = 5.72161
z_o := 105/67.5*2.095^2 = 6.82737
z_o := 91.5/54.5*1.421^2 = 3.3901
z_o := 76.5/43.5*2.353^2 = 9.7368
z_o := 68.5/36*1.898^2 = 6.85457
z_o := 48/27*2.083^2 = 7.71358
Z_k := U_1k/I_1H = 52.2222
u_k := I_1H*Z_k/U_1H*100% = 0.0854545
I_2o := [91, 67.5, 54.5, 43.5, 36, 27]
P_o := [55, 39, 29.5, 31.5, 15.5, 10]
r_o := P_o/I_2o^2*k^2  # error: Эта матрица должна быть квадратной. Число строк должно равняться числу столбцов.
k := U_1o/U_2o = [2.08333, 2.09524, 1.42077, 2.35294, 1.89781, 2.08333]
r_o := 55/91^2*2.083^2 = 0.0288176
r_o := 39/68.5^2*2.095^2 = 0.0364797
r_o := 29.5/54.5^2*1.421^2 = 0.0200547
r_o := 31.5/43.5^2*2.353^2 = 0.0921671
r_o := 10/27^2*2.083^2 = 0.0595184
r_o := 15.5/36^2*1.898^2 = 0.0430843
r_o := [0.029, 0.036, 0.02, 0.092, 0.06, 0.043]
z_o := [5.722, 6.827, 3.39, 9.737, 6.855, 7.714]
x := sqrt(Z_o^2 - r_o^2)  # error: Эта переменная не определена. Проверьте правильность установки обозначения.
x := sqrt(5.722^2 - 0.029^2) = 5.72193
x := sqrt(6.827^2 - 0.036^2) = 6.82691
x := sqrt(3.39^2 - 0.02^2) = 3.38994
x := sqrt(9.737^2 - 0.092^2) = 9.73657
x := sqrt(6.855^2 - 0.06^2) = 6.85474
x := sqrt(7.714^2 - 0.042^2) = 7.71389
P_o := [55, 39, 29.5, 31.5, 15.5, 10]
x := [5.722, 6.827, 3.39, 9.737, 6.855, 7.714]
I_2o := [91, 67.5, 54.5, 43.5, 36, 27]
U_2o := [120, 105, 91.5, 76.5, 68.5, 48]
cos(φ_o) := P_o/(U_2o*I_2o)  # error: Размерности массива не совпадают.
cos(φ_o) := 55/(120*91) = 0.00503663
cos(φ_o) := 39/(67.5*105) = 0.00550265
cos(φ_o) := 29.5/(54.5*91.5) = 0.00591568
cos(φ_o) := 31.5/(43.5*76.5) = 0.00946586
cos(φ_o) := 15.5/(36*68.5) = 0.00628548
cos(φ_o) := 10/(27*48) = 0.00771605
P_k.H := 3.6
r_k := P_k.H/I_1H^2 = 27.7778
r_1 := r_k/2 = 13.8889
u_k.p := I_1H*r_k/U_1H = 0.0454545
x_k := sqrt(Z_k^2 - r_k^2) = 44.2217
x_1 := x_k/2 = 22.1108
P_o := [55, 39, 29.5, 31.5, 15.5, 10]
P_c := P_o - (I_2o/k)^2*r_1  # error: Эта матрица должна быть квадратной. Число строк должно равняться числу столбцов.
I_2o := [91, 67.5, 54.5, 43.5, 36, 27]
k := [2.083, 2.095, 1.421, 2.353, 1.898, 2.083]
P_c := 55 - (91/2.083)^2*r_1 = -26452.7
P_c := 39 - (67.5/2.095)^2*r_1 = -14379.1
P_c := 29.5 - (54.5/1.421)^2*r_1 = -20400.7
P_c := 31.5 - (43.5/2.353)^2*r_1 = -4715.31
P_c := 15.5 - (36/1.898)^2*r_1 = -4981.16
P_c := 10 - (27/2.083)^2*r_1 = -2323.55
P_k.H := 3.6
P_c := [-2.645*10^4, -1.438*10^4, -2.04*10^4, -4.715*10^3, -4.981*10^3, -2.324*10^3]
k_H.M. := sqrt(P_c/P_k.H)  # error: Значение должно быть вектором.
k_H.M. := sqrt(-2.645*10^4/3.6) = 85.7159i
k_H.M. := sqrt(-1.438*10^4/3.6) = 63.2016i
k_H.M. := sqrt(-2.04*10^4/3.6) = 75.2773i
k_H.M. := sqrt(-4.715*10^3/3.6) = 36.1901i
k_H.M. := sqrt(-4.981*10^3/3.6) = 37.1969i
k_H.M. := sqrt(-2.324*10^3/3.6) = 25.4078i
k_H.M. := [85.716, 63.202, 75.277, 36.19, 37.197, 25.408]
r_o := [0.029, 0.036, 0.02, 0.092, 0.06, 0.043]
z_o := [5.722, 6.827, 3.39, 9.737, 6.855, 7.714]
x_o := sqrt(z_o^2 - r_o^2)  # error: Эта матрица должна быть квадратной. Число строк должно равняться числу столбцов.
x_o := sqrt(5.722^2 - 0.029^2) = 5.72193
x_o := sqrt(6.827^2 - 0.036^2) = 6.82691
x_o := sqrt(3.39^2 - 0.02^2) = 3.38994
x_o := sqrt(9.737^2 - 0.092^2) = 9.73657
x_o := sqrt(6.855^2 - 0.06^2) = 6.85474
x_o := sqrt(7.714^2 - 0.043^2) = 7.71388
x_o := [5.722, 6.827, 3.39, 9.737, 6.855, 7.714]
I_2 := [4.4, 4, 3.5, 3, 2.5, 4.8]
I_2k := 4.2
k_H := I_2/I_2H = [1.04762, 0.952381, 0.833333, 0.714286, 0.595238, 1.14286]
P_M := k_H^2*P_k.H  # error: Эта матрица должна быть квадратной. Число строк должно равняться числу столбцов.
P_M := 1.048^2*P_k.H = 3.95389
P_M := 0.952^2*P_k.H = 3.26269
P_M := 0.833^2*P_k.H = 2.498
P_M := 0.714^2*P_k.H = 1.83527
P_M := 0.595^2*P_k.H = 1.27449
P_M := 1.143^2*P_k.H = 4.70322
P_M := [3.954, 3.263, 2.498, 1.835, 1.274, 4.703]
ΣP := P_c + P_M = [-26446, -14376.7, -20397.5, -4713.16, -4979.73, -2319.3]
cosφ_k := P_k.H/(U_1k*I_1H) = 0.531915
u_k.a. := I_1H*r_k/U_1H*100 = 4.54545
u_k.a. := I_1H*r_k/U_1H = 0.0454545
u_k.р. := I_1H*x_k/U_1H*100 = 7.23627
u_k.р. := I_1H*x_k/U_1H = 0.0723627
P_1 := [83.5, 78, 70, 62, 51, 40]
cosφ_1 := P_1/(U_1*I_1)  # error: Размерности массива не совпадают.
U_1 := [0, 0.25, 0.5, 0.75, 1, 1.5]
I_1 := [77, 79.5, 63, 55.5, 45, 36]
cosφ_1 := P_1/(0*77)  # error: Невозможно вычислить выражение, поскольку оно делится на ноль.
cosφ_1 := 78/(0.25*79.5) = 3.92453
cosφ_1 := 70/(0.5*63) = 2.22222
cosφ_1 := 62/(0.75*55.5) = 1.48949
cosφ_1 := 51/(1*45) = 1.13333
cosφ_1 := 40/(1.5*36) = 0.740741
φ_2 := 0
I_2p := I_2a*tan(acos(φ_2)) = [7.18598e16, 6.53271e16, 5.71612e16, 4.89953e16, 4.08294e16, 7.83925e16]
u_k.a. = 0.0454545
u_k.p. =  # error: Эта переменная не определена. Проверьте правильность установки обозначения.
